# Worksheet setting: ORIGIN = 1
# Ejemplo 1. Diseñar un ciclón para separar sólidos de una corriente gaseosa. La densidad de la partículas es de 1500 kg/m3 y el gas es aire a 450 °C. El
# caudal de la corriente es 3.2 m3/s, y la operación es a una presión de 85.3 kPa. La concentración de las partículas es de 2.0 g/m3 y, según las normas de emisión, se requiere una eficiencia de separación del 80%. La distribución de tamaño de las partículas en la corriente gaseosa es la siguiente (tabla 6):
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# como el %45 son entre 5 y 10 micras, vamos a elegir uno de alta eficiencia
δ_p := 1500*kg/m^3
T_g := (273 + 450)*K = 723 K
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Q := 3.2*m^3/s
v_e := 22*m/s
ρ_gas := 0.411*kg/m^3
μ_gas := 3.57*10^-5*kg/(m*s)
Area := Q/v_e = 0.145455 m^2
D_c := 1.2 m
K_a := 0.5
K_b := 0.2
S := 0.5*D_c = 0.6 m
G == 551.22
h := 1.5*D_c = 1.8 m
D_s := 0.5*D_c = 0.6 m
z := 2.5*D_c = 3 m
H := 4*D_c = 4.8 m
B := 0.375*D_c = 0.45 m
a := 0.5*D_c = 0.6 m
b := 0.2*D_c = 0.24 m
Tam := [5; 10; 30; 50; 70; 100]*μm
D_p :=
    for i ∈ 1 .. rows(Tam) - 1
        D_p[i] ← (Tam[i] + Tam[i + 1])/2
    D_p
D_p = [7.5; 20; 40; 60; 85] μm
m_i := [45; 25; 15; 10; 5]
# Antes del cálculo de la eficiencia se debe determinar si existe re-suspensión de partículas. Se debe determinar la Velocidad de Saltación y la relación entre esta y la velocidad de ingreso debe ser menor a 1.35 para que no haya re-suspensión de partículas
V_eq == Veloc_Equivalente
V_eq := (4*g*μ_gas*(δ_p - ρ_gas)/(3*ρ_gas^2))^(1/3) = 1.60622 m/s
V_s == Veloc_saltación
V_s := 4.913*V_eq*K_b^0.4*(D_c/m)^0.067*(v_e/(m/s))^(2/3)/(1 - K_b)^(1/3) = 35.4912 m/s
v_e/V_s = 0.619871  # El valor es menor a 1.35 por lo que no hay re-suspensión
# Volumen del ciclon evaluado sobre la Salida
V_SC := π/4*(S - a/2)*(D_c^2 - D_s^2)
V_SC = 0.254469 m^3
# Longitud natural del ciclón
L_c := 2.3*D_s*(D_c^2/(a*b))^(1/3) = 2.97312 m
# La condición a cumplir es que L < Hc - Sc
K_L := D_c - (D_c - B)*((S + L_c - h)/z)
K_L = 0.75672 m
V_R := π/4*D_c^2*(h - S) + π/12*D_c^2*(L_c + S - h)*(1 + K_L/D_c + (K_L/D_c)^2) - π/4*D_s^2*L_c
V_R = 1.87233 m^3
# Determinar el Factor dimensional de las proporciones volumétricas del ciclón
K_c := (V_SC + V_R/2)/D_c^3
K_c = 0.689023
# Determinamos el factor de configuración G
G_c := 8*K_c/(K_a*K_b)^2
G_c = 551.219
# El exponente del vórtice será
n_v := 1 - (1 - 0.67*(D_c/m)^0.14)*(T_g/(283*K))^0.3
n_v = 0.585711
# Tiempo de relajación Ti
# Lo calculamos para el valor promedio de tamaño de las partículas mas pequeñas, en este caso entre 5 y 10 μm
T_i := δ_p*D_p^2/(18*μ_gas)
T_i = [0.000131303; 0.000933707; 0.00373483; 0.00840336; 0.0168651] s
# Eficiencia fraccional por intervalo de tamaño
Q_gas := Q
η := 1 - exp(-2*((G_c*T_i*Q_gas*(n_v + 1)/D_c^3)^(0.5/(n_v + 1))))
η = [0.706923; 0.897529; 0.970612; 0.989484; 0.996565]
# Eficiencia total
η_T := η*m_i
η_T = 83.6866
vectorize(η*m_i) = [31.8115; 22.4382; 14.5592; 9.89484; 4.98282]
K_t := 16
# Se debe calcular la caída de presión del ciclón y determinar si se requiere otro tipo de ciclón
# cuando la entrada es tangencial
N_H := K_t*a*b/D_s^2
N_H = 6.4
# La caída de presión
ΔP := 1/2*ρ_gas*v_e^2*N_H
ΔP = 0.636557 kPa
Pot_f := Q_gas*ΔP = 2.73164 hp
