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ΔP := -338 kPa
A_f := 0.045 m^2
μ_f := 0.01*poise
t_f := [4.4; 9.5; 16.3; 24.6; 34.7; 46.1; 59; 73.6; 89.4; 107.3]*s
V_f := [0.498; 1; 1.501; 2; 2.498; 3.002; 3.506; 4.004; 4.502; 5.009]*L
C_s := 23.5*kg/m^3
f(x) := [x^2; x]
[k_1; k_2] := linfit(V_f/L, t_f/s, f) = [3.00093; 6.36174]
K_1 := k_1*s/L^2
K_2 := k_2*s/L
K_1 == μ*α*C_s/(2*A^2*(-ΔP))
K_2 == μ/(A*(-ΔP))*R_m
R_m := -A_f*K_2*ΔP/μ_f = 9.67621e10 1/m
α := -2*A_f^2*K_1*ΔP/(C_s*μ_f) = 1.74808e11 m/kg
V_f := 10 m^3
A_f := 20*2*900*mm*900*mm = 32.4 m^2
t(V) := μ_f*α*C_s/(2*A_f^2*(-ΔP))*V^2 + μ_f/(A_f*(-ΔP))*R_m*V
t(V_f) = 11.1207 min
