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A_f := 0.045 m^2
C_s := 23.5*kg/m^3
ΔP := -46.2 kPa
μ_f := 0.01*poise
t_f := [17.3; 41.3; 72; 108.3; 152; 201.7]*s
V_f := [0.5; 1; 1.5; 2; 2.5; 3]*L
f(x) := [x^2; x]
[k_1; k_2] := linfit(V_f/L, t_f/s, f) = [12.9522; 28.3806]
K_1 := k_1*s/L^2
K_2 := k_2*s/L
R_m := -A_f*K_2*ΔP/μ_f = 5.90032e10 1/m
α := -2*A_f^2*K_1*ΔP/(C_s*μ_f) = 1.03127e11 m/kg
N_m := 20
L_m := 900 mm
A_f := N_m*2*L_m^2 = 32.4 m^2
V_f := 2.3 m^3
A_f := 20*2*900*mm*900*mm = 32.4 m^2
t(V) := μ_f*α*C_s/(2*A_f^2*(-ΔP))*V^2 + μ_f/(A_f*(-ΔP))*R_m*V
t(V_f) = 3.71385 min
