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A_f := 0.045 m^2
C_s := 23.5*kg/m^3
ΔP := -194.4 kPa
μ_f := 0.01*poise
t_f := [6.3; 14; 24.2; 37; 51.7; 69; 88.8; 110; 134; 160]*s
V_f := [0.5; 1; 1.5; 2; 2.5; 3; 3.5; 4; 4.5; 5]*L
f(x) := [x^2; x]
1
[k_1; k_2] := linfit(V_f/L, t_f/s, f) = [4.50223; 9.50748]
K_1 := k_1*s/L^2
K_2 := k_2*s/L
R_m := -A_f*K_2*ΔP/μ_f = 8.31715e10 1/m
α := -2*A_f^2*K_1*ΔP/(C_s*μ_f) = 1.50838e11 m/kg
