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α_var := [1.748*10^11*m/kg; 1.031*10^11*m/kg; 1.508*10^11*m/kg]
ΔP := [338 kPa; 46.2 kPa; 194.4 kPa]
α_var == α_0*ΔP^n
ln(α_var) == ln(α_0) + n*ln(ΔP)
lnα_var := ln(α_var/(m/kg)) = [25.8869; 25.359; 25.7392]
lnΔP := ln(ΔP/kPa) = [5.82305; 3.83298; 5.26992]
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[coef_1; coef_2] := line(lnΔP, lnα_var) = [24.3425; 0.265157]
α_0 := e^coef_1 = 3.73075e10
f(x) := [x; 1]
linfit(lnΔP, lnα_var, f) = [0.265157; 24.3425]
α := α_0*m/kg*(ΔP/kPa)^coef_2 = [1.74725e11; 1.03083e11; 1.5089e11] m/kg
