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μ_f := 0.01*poise
A_f := 0.0414 m^2
ΔP := -267 kPa
K_1 := 10.25*10^6*s/m^6
K_2 := 3.4*10^3*s/m^3
K_1 == μ_f*α*C_s/(2*A_f^2*(-ΔP))
K_2 == μ_f*R_m/(A_f*(-ΔP))
R_m := -A_f*K_2*ΔP/μ_f = 37582920000 1/m
K_1 == μ_f*K_α.cs/(2*A_f^2*(-ΔP))
K_α.cs := -2*A_f^2*K_1*ΔP/μ_f
A_f := 6.97 m^2
t(V) := μ_f*K_α.cs/(2*A_f^2*(-ΔP))*V^2 + μ_f*R_m/(A_f*(-ΔP))*V
t_filtrado := t(1 m^3) = 6.36368 min
V_lavado := 0.2 m^3
V_f := 1 m^3
# recalculo k1 y k2
K_2 := μ_f*R_m/(A_f*(-ΔP)) = 20.1951 s/m^3
K_1 := μ_f*K_α.cs/(2*A_f^2*(-ΔP)) = 361.625 s/m^6
v_lavado := 1/4*(1/(2*K_1*V_f + K_2)) = 0.336272 L/s
t_lavado := V_lavado/v_lavado = 9.91261 min
t_limpieza := 10 min
t_ciclo := t_filtrado + t_lavado + t_limpieza = 26.2763 min
