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K_1 := 6*10^-5*s/L^2
K_2 := 0.01*s/L
ΔP := 2.67 bar
cte_1 := K_1*2*ΔP
cte_1 == μ*α*C_s/A_f^2
K_1 == μ*α*C_s/(2*Af^2*ΔP)
cte_2 == μ*R_m/A_f
cte_2 := K_2*ΔP
K_2 == μ*R_m/(A_f*ΔP)
# Ecuación a caudal constante
Q := 10*L/s
ΔP == cte_1*Q^2*t + cte_2*Q
ΔP == μ*α*C_s/A_f^2*Q^2 + μ*R_m/A_f*Q  # --->
3.45 bar == cte_1*Q^2*t + cte_2*Q
t := (3.45*bar - Q*cte_2)/(Q^2*cte_1) = 1.65574 min
cte_1 = 32040000 kg/(m^7*s)
cte_2 = 2670000 kg/(m^4*s)
