# 2) Ruth y Kempe utilizaron para sus experiencias un precipitado de CaCO3 suspendido en agua. Se diseñó
# un filtro especial de placas y marcos con una superficie filtrante de 0,026 m2
# y un espesor de 3 cm.
# Todas las pruebas se realizaron a 19 ºC y a una diferencia de presión de 2,7 atm. El lodo inicial contenía
# un 0,0723 como fracción en peso de CaCO3. La densidad del CaCO3 es 2,93 g/cm3
# y la densidad
# aparente de la torta seca es 1,60 g/cm3
# . Los resultados experimentales son los siguientes:
# V (lts) 0,2 0,4 0,6 0,8 1,2 1,6
# t (s) 1,8 4,2 7,5 11,2 20,5 33,4
# Se pide: a) La porosidad de la torta; b) La relación (masa torta húmeda)/(masa torta seca); c) La
# resistencia específica del medio filtrante; d) La de la torta.
A_f := 0.026 m^2
δ_s := 2.93*gm/cm^3
esp := 3 cm
Vol := [0.2; 0.4; 0.6; 0.8; 1.2; 1.6]*L
t := [1.8; 4.2; 7.5; 11.2; 20.5; 33.4]*s
ΔP := -2.7 atm
δ_ts := 1.6*gm/cm^3
s_s := 0.0723
δ_l := 1*gm/cm^3
ε := 1 - δ_ts/δ_s = 0.453925  # porosidad de la torta
m_t := ((1 - ε)*δ_s + ε*δ_l)/((1 - ε)*δ_s) = 1.2837  # relacion m tota hum / m torta seca
C_s := δ_l*s_s/(1 - m_t*s_s) = 79.6968 kg/m^3
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F(x) := [x^2; x]
μ := 0.01*poise
[K_1; K_2] := linfit(Vol/L, t/s, F) = [8.57605; 7.0639]
H(x) := K_1*x^2 + K_2*x
K_1 := K_1*s/l^2
K_2 := K_2*s/L
K_2 == μ/(A_f*(-ΔP))*R_m
K_1 == μ*α*C_s/(2*A_f^2*(-ΔP))
R_m := -A_f*K_2*ΔP/μ = 5.02456e10 1/m
α := -2*A_f^2*K_1*ΔP/(C_s*μ) = 3.98019e10 m/kg
r := α*δ_s*(1 - ε) = 6.3683e9 1/cm^2
# Resistencia específica de la torta
V_c := R_m*A_f/(α*C_s) = 0.411839 L
L_0 := R_m/r = 0.000788996 m
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