# El resultado efectuado en el laboratorio sobre un filtro prensa de placa y marcos de 152 mm de lado,
# utilizando dos marcos de 51 mm de espesor cada uno se dan en la siguiente tabla (se utilizó suspensión
# de carbonato de calcio). La diferencia de presión a través de la prensa fue de 2.1 kgf/cm2
# .
# Masa de filtrado (kg) 2.27 4.54 6.81 9.08 11.35 13.52 15.89
# tiempo (s) 26 98 211 361 555 788 1083
# Otros datos: m = 1.473 (relación de pesos de torta húmeda a torta seca); μfiltrado = 3.06 kg/m.h
# (viscosidad del filtrado); δfiltrado = 996 kg/m3
# (densidad del filtrado); δsolido = 2630 kg/m3
# ; mt = 0.139
# (fracción en peso de sólidos).
# Se pide: a) Superficie filtrante; b) Volumen y tiempo de filtrado necesario para formar una torta de
# resistencia equivalente a la del medio filtrante; c) Resistencia específica másica de la torta
δ_f := 996*kg/m^3
δ_s := 2630*kg/m^3
μ_f := 3.06*kg/(m*hr)
M_f := [2.27; 4.54; 6.81; 9.08; 11.35; 13.52; 15.89]*kg
t := [26; 98; 211; 361; 555; 788; 1083]*s
V_f := M_f/δ_f = [2.27912; 4.55823; 6.83735; 9.11647; 11.3956; 13.5743; 15.9538] L
ΔP := -2.1*kgf/cm^2
L_m := 152 mm
m_t := 1.473
s_s := 0.139
A_f := 2*L_m^2 = 462.08 cm^2
C_s := δ_f*s_s/(1 - m_t*s_s) = 174.088 kg/m^3
F(x) := [x^2; x]
[K_1; K_2] := linfit(V_f/L, t/s, F) = [4.10215; 2.33859]
K_1 := K_1*s/L^2
K_2 := K_2*s/L
α := 2*K_1*A_f^2*(-ΔP)/(μ_f*C_s) = 2.43797e10 m/kg
R_m := K_2*A_f*(-ΔP)/μ_f = 2.61813e10 1/m
V_e := R_m*A_f/(α*C_s) = 0.285044 L
t_e := K_1*V_e^2 + K_2*V_e = 0.999901 s
