# 4) Se cuenta con los siguientes datos para filtrar en el laboratorio una suspensión de CaCO3 en agua a
# 298.2 K (25 ºC), a presión constante (-Δp) de 338 kN/m2 (7060 lbf/pie2). El área de filtración de la
# prensa de placas y marcos es A = 0.0439 m2 (0.473 pie2), y la concentración de la suspensión es
# Cs =23.47 kg/m3 (1.465 Ib /pie3). Calcule las constantes α y Rm, con base en estos dato experimentales,
# si t es el tiempo en segundos y V es el volumen de filtrado recolectado en m3
A_f := 0.0439 m^2
ΔP := -338*kN/m^2
t := [4.4; 9.5; 16.3; 24.6; 34.7; 46.1; 59.0; 73.6; 89.4; 107.3]*s
C_s := 23.47*kg/m^3
V_f := [0.489; 1; 1.501; 2; 2.489; 3.02; 3.506; 4.004; 4.502; 5.009]*10^-3*m^3
μ_f := 8.937*10^-4*Pa*s
F(x) := [x^2; x]
[k_1; k_2] := linfit(V_f/L, t/s, F) = [3.00494; 6.33752]
K_1 := k_1*s/L^2
K_2 := k_2*s/L
α := 2*K_1*A_f^2*(-ΔP)/(μ_f*C_s) = 1.86641e11 m/kg
R_m := K_2*A_f*(-ΔP)/μ_f = 1.05223e11 1/m
# 5) Se desea filtrar la misma suspensión del ejemplo anterior en un filtro prensa de placas y marcos que
# tiene 20 marcos y 0.873 m2 (9.4 pie2) de área por marco. Se usará la misma presión constante.
# Suponiendo las mismas propiedades de la torta de filtrado y de la tela de filtración, calcule el tiempo
# necesario para extraer 3.37 m3 (119 pie3 ) de filtrado.
A_m := 0.873 m^2
N_m := 20
A_f := A_m*N_m
V_f := 3.37 m^3
t_f := μ_f*α*C_s/(2*A_f^2*(-ΔP))*V_f^2 + μ_f*R_m/(A_f*(-ΔP))*V_f = 269.442 s
# 6) Al final del ciclo de filtrado del ejemplo del ejercicio 5, se recolecta un volumen total de filtrado de
# 3.37 m3 en un tiempo total de 263.779 s. Se desea lavar la torta en la prensa de placas y marcos,
# usando un volumen de agua igual al 10% de volumen del filtrado. Calcule el tiempo de lavado y el del
# ciclo total de filtración suponiendo que la limpieza del filtro toma 20 min.
V_lavado := V_f*0.1
vel_lavado := V_lavado/(263.779 s) = 1.27758 L/s
K_1b := μ_f*α*C_s/(2*A_f^2*(-ΔP))
K_2b := μ_f*R_m/(A_f*(-ΔP))
veloc_lavado := 1/4*(1/(2*K_1b*V_f + K_2b)) = 1.73645 L/s
t_lavado := V_lavado/veloc_lavado
t_limpieza := 20 min
t_cliclo := t_f + t_lavado + t_limpieza = 27.7253 min
