# 8) Una pulpa de 20% de un mineral de oro silíceo tuvo que ser filtrada a velocidad constante para
# recuperar el oro. El medio de filtración era de tela y el área de superficie filtrante 0,09 m2. La presión
# se incrementó gradualmente para mantener la tasa de filtración en 1,8 x 10-5 m3/s. Estimación de las
# resistencias de la torta y el medio.
# Datos:
# Densidad de sólidos = 3.845 kg/m3 Densidad de filtrado = 1.000 kg/m3
# La viscosidad del filtrado a 25 ° C = 0,89 mPa s Humedad de la torta = 10%
δ_s := 3.845*kg/m^3
δ_f := 1000*kg/m^3
μ_f := 0.89*10^-3*Pa*s
s_s := 0.2
Q_v := 1.8*10^-5*m^3/s
A_f := 0.09 m^2
f(x) := [x; 1]
t := [50; 100; 150; 200; 250]*s
ΔP := [1.2; 1.52; 2.08; 2.5; 3]*10^4*Pa
m_t := 100/(100 - 10) = 1.11111
C_s := δ_f*s_s/(1 - m_t*s_s) = 257.143 kg/m^3
[k_1; k_2] := linfit(t/s, ΔP/Pa, f) = [91.6; 6860]
K_1 := k_1*Pa/s
K_2 := k_2*Pa
(-ΔP) == μ_f*α*C_s*Q_v^2/A_f^2*t + μ_f*Q_v*R_m/A_f
K_1 == μ_f*α*C_s*Q_v^2/A_f^2
α := A_f^2*K_1/(μ_f*C_s*Q_v^2) = 1.00062e10 m/kg
R_m := A_f*K_2/(μ_f*Q_v) = 3.85393e10 1/m
