# 9) Un mineral de níquel de la gravedad específica 3.091 kg/m3 fue convertido en pulpa con ácido
# sulfúrico diluido. La pulpa contiene 28% de sólidos. Después de disolver las sales solubles en la pulpa
# se filtró a través de un medio de cerámica fina en la forma de un disco circular de área de 0,178 m2.
# La presión aplicada inicial fue de 10 kPa. El filtrado se recogió después de un aumento gradual de la
# presión a intervalos conocidos que dieron un grosor de torta de 12 mm y 12% de humedad. Los datos
# recogidos se tabulan a continuación. La temperatura del filtrado fue de 25 °C. Determinar la resistencia
# específica de la torta depositada y del medio filtrante. La viscosidad de ácido sulfúrico a 25ºC es 1,33
# mPa*s y su densidad 1030 kg/m3
e_t := 12 mm
s_s := 0.28
A_f := 0.178 m^2
μ_f := 1.33*10^-3*Pa*s
ΔP := -10 kPa
δ_f := 1030*kg/m^3
t := [72.4; 130; 823; 1082.4; 1370; 1740; 2400; 3010; 3640; 4280; 4820; 5350; 5800; 6250; 6700; 7150]*s
V_f := [0.072; 0.079; 0.112; 0.124; 0.138; 0.154; 0.180; 0.201; 0.221; 0.239; 0.253; 0.267; 0.278; 0.289; 0.299; 0.308]*m^3
ΔP_1 := [0.1; 0.4; 0.6; 0.8; 1; 1.2; 1.4; 1.4; 1.4; 1.4; 1.4; 1.4; 1.4; 1.4; 1.4; 1.4]*kPa
f(x) := [x^2; x]
m_t := 100/(100 - 12)
C_s := δ_f*s_s/(1 - m_t*s_s) = 422.987 kg/m^3
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[k_1; k_2] := linfit(V_f/L, t/s, f) = [0.0811082; -1.64986]
K_1 := k_1*s/L^2
K_2 := k_2*s/L
K_1 == μ*α*C_s/(2*A^2*(-ΔP))
K_2 == μ/(A*(-ΔP))*R_m
α := -2*A_f^2*K_1*(-ΔP)/(C_s*μ_f) = -91360032 m/kg
R_m := K_2*A_f*(-ΔP)/μ_f = -2.20808e9 1/m
K_1 = 81108.2 s/m^6
F(x) := K_1*x^2 + K_2*x
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