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C_0 := 236*gm/L
H_0 := 36 cm
t_exp := [0.001; 0.25; 0.5; 1; 1.75; 3; 4.75]*hr
h_exp := [36; 32.4; 28.6; 21; 14.7; 12.2; 11.55]*cm
# C_0 = Concentración inicial de sólidos
# h_0 = Altura inicial de suspención
# t_L = Tiempo
# z_L = Altura de la "interfase"
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[c_1; c_2; c_3] := expfit(t_exp/hr, h_exp/cm) = [26.495; -0.904882; 10.5318]
h_calc(t) := (c_1*exp(c_2*t/hr) + c_3)*cm
h_calc(0 s) = 0.370268 m
v_s(t) := -d/dt(h_calc(t))
v_s(1 min) = 23.616 cm/hr
C_L(t) := C_0*H_0/(h_calc(t) + v_s(t)*t)
C_L(60 min) = 274.495 kg/m^3
v_s(60 min) = 9.69997 cm/hr
t_r := 0 hr, 0.2 hr .. 5 hr
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C_u := 550 gm/L
C_0 = 236 gm/L
UA(t) := 1/v_s(t)*(1/C_L(t) - 1/C_u)
UA(0 s) = 0.0105943 m^2/(kg/hr)
F_0 := 50*ton/hr/C_0 = 192.2 m^3/hr
S(t) := F_0*C_0/v_s(t)*(1/C_L(t) - 1/C_u)
S_exp := vectorize(S(t_exp)) = [480.984; 586.235; 684.867; 853.352; 991.004; 538.905; -4926.64] m^2
v_s(10 min) = 5.72737e-5 m/s
C_L(10 min) = 231.157 kg/m^3
D_e := (991 m^2*4/π)^(1/2) = 35.5215 m
max(vectorize(S_exp)) = 991.004 m^2
D_esp := (max(vectorize(S_exp))*4/π)^(1/2) = 35.5216 m
t_2 := 0 min, 1 min .. 180 min
R_L(t) := v_s(t)/(1/C_L(t) - 1/C_u)
R_L(10 min) = 0.137025 kg*cm/(L*min)
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t := 100 min
t_min := Minimize(R_L, t) = 111.699 min
# annotation to a formula above: nos da el tiempo donde rl es minimo
S(t_min) = 993.916 m^2
