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ρ_solido := 2*gm/cm^3
ρ_susp := 1*gm/cm^3
H_0 := 31*cm
C_0 := 1.2 gm/(100 mL)
C_u := 8 gm/(100 mL)
Q_0 := 1000000*gal/day = 157.725 m^3/hr
Q_m := Q_0*ρ_susp = 43.8126 kg/s
Q_u := Q_0*C_0/C_u = 23.6588 m^3/hr
h_exp := [31; 21; 10; 3.2; 2.2; 2.1; 2; 1.96]*cm
t_exp := [0; 5; 10; 20; 40; 60; 180; 240]*min
[c_1; c_2; c_3] := expfit(t_exp/hr, h_exp/cm) = [30.1116; -6.91803; 1.69929]
h_calc(t) := (c_1*exp(c_2*t/hr) + c_3)*cm
h_calc(0 s) = 0.318109 m
v_s(t) := -d/dt(h_calc(t))
v_s(1 min) = 185.627 cm/hr
C_L(t) := C_0*H_0/(h_calc(t) + v_s(t)*t)
S(t) := Q_0*C_0/v_s(t)*(1/C_L(t) - 1/C_u)
S_exp := vectorize(S(t_exp)) = [66.3388; 103.118; 135.515; 170.827; -312.906; -6699.03; -7.43256e9; -7.50912e12] m^2
D_e := (991 m^2*4/π)^(1/2) = 35.5215 m
max(vectorize(S_exp)) = 170.827 m^2
D_esp := (max(vectorize(S_exp))*4/π)^(1/2) = 14.748 m
