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C_0 := 2500*mg/L
C_u := 10900*mg/L
Q_0 := 4.5*10^6*L/day
H_0 := 51 cm
h_exp := [51; 43.5; 37; 30.6; 23; 17.9; 14.3; 12.2; 11.2; 10.7]*cm
t_exp := [0.001; 1; 2; 3; 5; 8; 12; 16; 20; 25]*min
[c_1; c_2; c_3] := expfit(t_exp/min, h_exp/cm) = [40.2666; -0.229741; 11.0209]
h_calc(t) := (c_1*exp(c_2*t/min) + c_3)*cm
h_calc(0 s) = 0.512875 m
v_s(t) := -d/dt(h_calc(t))
v_s(1 min) = 441.123 cm/hr
C_L(t) := C_0*H_0/(h_calc(t) + v_s(t)*t)
S(t) := Q_0*C_0/v_s(t)*(1/C_L(t) - 1/C_u)
S_exp := vectorize(S(t_exp)) = [26.2291; 32.2349; 38.2167; 44.161; 55.8954; 72.8758; 93.1444; 107.023; 104.883; 40.0133] m^2
D_e := (991 m^2*4/π)^(1/2) = 35.5215 m
max(vectorize(S_exp)) = 107.023 m^2
D_esp := (max(vectorize(S_exp))*4/π)^(1/2) = 11.6733 m
