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Q_0 := 3.785*10^6*L/day
C_0 := 236*gm/L
C_u := 700*gm/L
h_exp := [36; 32.4; 28.6; 21; 14.7; 12.3; 11.55; 9.8; 8.8]*cm
H_0 := h_exp[0] = 0.36 m
t_exp := [0; 0.25; 0.5; 1; 1.75; 3; 4.75; 12; 20]*hr
[c_1; c_2; c_3] := expfit(t_exp/hr, h_exp/cm) = [27.0899; -0.841158; 9.74996]
h_calc(t) := (c_1*exp(c_2*t/hr) + c_3)*cm
h_calc(0 s) = 0.368399 m
v_s(t) := -d/dt(h_calc(t))
v_s(1 min) = 22.4697 cm/hr
C_L(t) := C_0*H_0/(h_calc(t) + v_s(t)*t)
S(t) := Q_0*C_0/v_s(t)*(1/C_L(t) - 1/C_u)
S_exp := vectorize(S(t_exp)) = [474.911; 573.69; 669.955; 852.453; 1087.43; 1262.66; 107.218; -1104613; -928867186] m^2
max(S_exp) = 1262.66 m^2
D_esp := (max(S_exp)*4/π)^(1/2) = 40.0958 m
