ORIGIN ≡ 1
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H_0 := 176 cm
δ_solidos := 2.63*gm/L
t_exp := [0; 20; 40; 60; 80; 100; 120; 140]*min
h_exp := [176; 100; 74; 57; 42; 34; 26; 22]*cm
δ_liquido := 1*gm/L
Q_0m := 400000*kg/day
Q_0 := Q_0m/δ_solidos
C_0sol := 3 gm/(100 gm) = 0.03
C_usol := 40 gm/(100 gm) = 0.4
C_0liq := 1 - C_0sol = 0.97
C_uliq := 1 - C_usol = 0.6
C_0 := C_0sol*δ_solidos + C_0liq*δ_liquido = 1.0489 gm/L
C_u := C_usol*δ_solidos + C_uliq*δ_liquido = 1.652 gm/L
[c_1; c_2; c_3] := expfit(t_exp/min, h_exp/cm) = [149.819; -0.0278135; 22.9942]
h_calc(t) := (c_1*exp(c_2*t/min) + c_3)*cm
v_s(t) := -d/dt(h_calc(t))
C_L(t) := C_0*H_0/(h_calc(t) + v_s(t)*t)
S(t) := Q_0*C_0/v_s(t)*(1/C_L(t) - 1/C_u)
S_exp := vectorize(S(t_exp)) = [879.44; 1128.5; 669.744; -1023.54; -4870.02; -12472; -26624.3; -52201.1] m^2
max(vectorize(S_exp)) = 1128.5 m^2
D_esp := (max(vectorize(S_exp))*4/π)^(1/2) = 37.9057 m
