ORIGIN ≡ 1
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δ_f := 1030*kg/m^3
μ := 1.27*10^-2*poise
C_s := 0.9*kg/m^3
δ_s := 1.59*gm/cm^3
ΔP_1 := 300 kPa
A_1 := 0.04 m^2
ΔP_2 := 450 kPa
n := 0.3
Q_m := 20000*kg/hr
# Inciso A
K_11 := 11*10^6*s/m^6
K_12 := 2500*s/m^3
α_1 := K_11*2*A_1^2*ΔP_1/(C_s*μ) = 9.23885e12 m/kg
R_m := A_1*ΔP_1*K_12/μ = 2.3622e10 1/m
# Inciso B
Q_v := Q_m/δ_f = 0.00539374 m^3/s
# Inciso C
Q_vs := Q_v*C_s/δ_s = 3.05306e-6 m^3/s
# Inciso E
α_1 == α_0*(ΔP_1/kPa)^n
α_0 := α_1/(ΔP_1/kPa)^n = 1.6691e12 m/kg
# Inciso F
α_2 := α_0*(ΔP_2/kPa)^n = 1.04339e13 m/kg
# Inciso D
V_1 := 20000 kg/δ_f = 19417.5 L
t_1 := 1 hr
A_2 := 1.5 m^2
Given
t_1/V_1 == α_2*μ*C_s/(A_2^2*2*ΔP_2)*V_1 + R_m*μ/(A_2*ΔP_2)
A_2 := Find(A_2) = 37.4336 m^2
# Inciso G
V_filtrado := 15 m^3
t_filtrado := α_2*μ*C_s/(A_2^2*2*ΔP_2)*V_filtrado^2 + R_m*μ/(A_2*ΔP_2)*V_filtrado = 35.9067 min
