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ΔP_1 := -0.06 atm
ΔP_2 := -2 atm
ΔP_3 := -3.5 atm
A_f := 0.05 m^2
C_s := 45.5*kg/m^3
μ_f := 1.1/100*poise
δ_s := 2210*kg/m^3
δ_f := 996*kg/m^3
F(x) := [x^2; x]
t_1 := [0.333; 0.750; 1.4; 2.083; 3.033; 4.333; 5.5; 7.5; 9.333; 11.667]*min
t_2 := [0.097; 0.225; 0.367; 0.550; 0.750; 1; 1.250; 1.5; 1.783; 2.150]*min
t_3 := [0.083; 0.167; 0.283; 0.417; 0.6; 0.817; 1.017; 1.250; 1.583; 1.9]*min
V_1 := [0.6; 1; 1.5; 2; 2.5; 3; 3.5; 4; 4.5; 5]*L
V_2 := [0.5; 1; 1.5; 2; 2.5; 3; 3.5; 4; 4.5; 5]*L
V_3 := [0.6; 1; 1.5; 2; 2.5; 3; 3.5; 4; 4.5; 5]*L
[k_a1; k_b2] := linfit(V_1/L, t_1/min, F) = [0.426046; 0.168568]
K_2 := k_b2*min/L
K_1 := k_a1*min/L^2
R_m1 := K_2*A_f*(-ΔP_1)/μ_f = 2.79494e9 1/m
α_1 := 2*K_1*A_f^2*(-ΔP_1)/(μ_f*C_s) = 1.55254e10 m/kg
[k_21; k_22] := linfit(V_2/L, t_2/min, F) = [0.0501774; 0.176355]
K_21 := k_21*min/L^2
K_22 := k_22*min/L
R_m2 := K_22*A_f*(-ΔP_2)/μ_f = 9.74681e10 1/m
α_2 := 2*K_21*A_f^2*(-ΔP_2)/(μ_f*C_s) = 6.09498e10 m/kg
[k_31; k_32] := linfit(V_3/L, t_3/min, F) = [0.0553876; 0.100258]
K_32 := k_32*min/L
K_31 := k_31*min/L^2
R_m3 := K_32*A_f*(-ΔP_3)/μ_f = 9.69684e10 1/m
α_3 := 2*K_31*A_f^2*(-ΔP_3)/(μ_f*C_s) = 1.17737e11 m/kg
α_var == α_0*(-ΔP)^n
α_var := [α_1; α_2; α_3] = [1.55254e10; 6.09498e10; 1.17737e11] m/kg
ΔP := [ΔP_1; ΔP_2; ΔP_3]
lnΔP := ln(-ΔP/atm) = [-2.81341; 0.693147; 1.25276]
lnα_var == ln*(α_0*(-ΔP)^n)
lnα_var := ln(α_var/(m/kg))
lnα_var == lnα_0 + n*lnΔP
lnα_var
f(x) := [x; 1]
[n; lna] := linfit(lnΔP, lnα_var, f) = [0.45987; 24.7299]
α_0 := e^lna*m/kg = 5.49619e10 m/kg
