# [area: FIltración Presión Constante]
[k_1; k_2] := linfit(V_f/L, t/s, F)
K_1 := k_1*s/L^2
K_2 := k_2*s/L
R_m := K_2*A_f*(-ΔP)/μ_f
α := 2*K_1*A_f^2*(-ΔP)/(μ_f*C_s)
t_f := μ_f*α*C_s/(2*A_f^2*(-ΔP))*V_f^2 + μ_f*R_m/(A_f*(-ΔP))*V_f
K_1 := μ_f*α*C_s/(2*A_f^2*(-ΔP))
K_2 := μ_f*R_m/(A_f*(-ΔP))
veloc_lavado := 1/4*(1/(2*K_1*V_f + K_2))
t_lavado := V_lavado/veloc_lavado
# [area: Filtración Caudal Constante]
[k_1; k_2] := linfit(t/s, ΔP/Pa, f)
K_1 := k_1*Pa/s
K_2 := k_2*Pa
α_var == α_0*ΔP^n
ln(α_var) == ln(α_0) + n*ln(ΔP)
α := A_f^2*K_1/(μ_f*C_s*Q_v^2)
R_m := A_f*K_2/(μ_f*Q_v)
lnα_var := ln(α_var/(m/kg))
lnΔP := ln(ΔP/kPa)
(-ΔP) == μ_f*α*C_s*Q_v^2/A_f^2*t + μ_f*R_m*Q_v/A_f
α_var == α_0*ΔP^n
ln(α_var) == ln(α_0) + n*ln(ΔP)
[coef_1; coef_2] := line(lnΔP, lnα_var)
lnα_var := ln(α_var/(m/kg))
lnΔP := ln(ΔP/kPa)
[c_1; c_2; c_3] := expfit(t_exp/min, h_exp/cm)
[coef_1; coef_2] := line(lnΔP, lnα_var)
α_0 := e^coef_1
h_calc(t) := (c_1*exp(c_2*t/min) + c_3)*cm
α := α_0*m/kg*(ΔP/kPa)^coef_2
α_0 := e^coef_1
v_s(t) := -d/dt(h_calc(t))
# [area: Sedimentación]
C_L(t) := C_0*H_0/(h_calc(t) + v_s(t)*t)
α := α_0*m/kg*(ΔP/kPa)^coef_2
S(t) := Q_0*C_0/v_s(t)*(1/C_L(t) - 1/C_u)
S_exp := vectorize(S(t_exp))
max(S_exp) =  # error: This variable is undefined.
D_esp := (max(S_exp)*4/π)^(1/2)
