Q_gas := 3.2 m^3/s
v_gas := 22*m/s
δ_p := 1500*kg/m^3
T_g := (273 + 450)*K = 723 K
ρ_gas := 0.411*kg/m^3
μ_gas := 3.57*10^-5*kg/(m*s)
# Starimad (Alta eficiencia) | Swift (Alta eficiencia)
# Echeverri (Alta eficiencia)
D_c := sqrt(Q_gas/(0.1*v_gas)) = 1.20605 m
D_c := sqrt(Q_gas/(0.092*v_gas)) = 1.25739 m
D_c := sqrt(Q_gas/(0.1*v_gas)) = 1.20605 m
K_a := 0.5
K_a := 0.5
K_a := 0.44
a := 0.5*D_c
a := 0.5*D_c
a := 0.44*D_c
K_b := 0.2
b := 0.2*D_c
K_b := 0.2
K_b := 0.21
b := 0.2*D_c
b := 0.21*D_c
S := 0.5*D_c
S := 0.5*D_c
S := 0.625*D_c
D_s := 0.5*D_c
D_s := 0.4*D_c
D_s := 0.5*D_c
h := 1.5*D_c
h := 1.4*D_c
h := 1.5*D_c
z := 2.5*D_c
z := 2.5*D_c
z := 2.5*D_c
H := 4*D_c
H := 3.9*D_c
H := 4*D_c
B := 0.375*D_c
B := 0.4*D_c
B := 0.375*D_c
0.21*0.44 = 0.0924
0.2*0.5 = 0.1
# Alta capacidad
# Starimad (Alta capacidad) | Swift (Alta capacidad)
D_c := sqrt(Q_gas/(0.281*v_gas)) = 0.719466 m
D_c := sqrt(Q_gas/(0.28*v_gas)) = 0.72075 m
K_a := 0.75
K_a := 0.8
a := 0.75*D_c
a := 0.8*D_c
K_b := 0.35
b := 0.375*D_c
K_b := 0.375
b := 0.35*D_c
S := 0.875*D_c
S := 0.85*D_c
D_s := 0.75*D_c
D_s := 0.75*D_c
h := 1.5*D_c
h := 1.7*D_c
z := 2.5*D_c
z := 2*D_c
H := 4*D_c
H := 3.7*D_c
B := 0.375*D_c
B := 0.4*D_c
0.8*0.35 = 0.28
0.75*0.375 = 0.28125
# Swift (Convencional) | Peterson - Whitby (Convencional) | Zenz (Convencional)
# Lapple (Convencional)
D_c := sqrt(Q_gas/(0.125*v_gas)) = 1.07872 m
D_c := sqrt(Q_gas/(0.121*v_gas)) = 1.0964 m
D_c := sqrt(Q_gas/(0.125*v_gas)) = 1.07872 m
D_c := sqrt(Q_gas/(0.125*v_gas)) = 1.07872 m
K_a := 0.5
K_a := 0.5
K_a := 0.583
a := 0.5*D_c
a := 0.5*D_c
a := 0.583*D_c
a := 0.5*D_c
K_a := 0.5
K_b := 0.25
K_b := 0.25
b := 0.25*D_c
b := 0.25*D_c
b := 0.208*D_c
K_b := 0.208
b := 0.25*D_c
K_b := 0.25
S := 0.75*D_c
S := 0.6*D_c
S := 0.583*D_c
S := 0.625*D_c
D_s := 0.5*D_c
D_s := 0.5*D_c
D_s := 0.5*D_c
D_s := 0.5*D_c
h := 2*D_c
h := 1.75*D_c
h := 1.333*D_c
h := 2*D_c
z := 2*D_c
z := 2*D_c
z := 1.837*D_c
z := 2*D_c
H := 4*D_c
H := 3.75*D_c
H := 3.17*D_c
H := 4*D_c
B := 0.25*D_c
B := 0.4*D_c
B := 0.5*D_c
B := 0.25*D_c
0.5*0.25 = 0.125
0.25*0.5 = 0.125
0.583*0.208 = 0.121264
0.5*0.25 = 0.125
V_eq := (4*g*μ_gas*(δ_p - ρ_gas)/(3*ρ_gas^2))^(1/3) = 1.60622 m/s
V_s := 4.913*V_eq*K_b^0.4*(D_c/m)^0.067*(v_e/(m/s))^(2/3)/(1 - K_b)^(1/3)
V_SC := π/4*(S - a/2)*(D_c^2 - D_s^2)
L_c := 2.3*D_s*(D_c^2/(a*b))^(1/3) = 2.48106 m
V_R := π/4*D_c^2*(h - S) + π/12*D_c^2*(L_c + S - h)*(1 + K_L/D_c + (K_L/D_c)^2) - π/4*D_s^2*L_c
K_c := (V_SC + V_R/2)/D_c^3
G_c := 8*K_c/(K_a*K_b)^2
n_v := 1 - (1 - 0.67*(D_c/m)^0.14)*(T_g/(283*K))^0.3
T_i := δ_p*D_p^2/(18*μ_gas)
T_i =  # error: This variable is undefined.
# Eficiencia fraccional por intervalo de tamaño
Q_gas := Q
η := 1 - exp(-2*((G_c*T_i*Q_gas*(n_v + 1)/D_c^3)^(0.5/(n_v + 1))))
η =  # error
# Eficiencia total
η_T := η*m_i
η_T =  # error
vectorize(η*m_i) =  # error
K_t := 16
# Se debe calcular la caída de presión del ciclón y determinar si se requiere otro tipo de ciclón
# cuando la entrada es tangencial
N_H := K_t*a*b/D_s^2
N_H = 8
# La caída de presión
ΔP := 1/2*ρ_gas*v_e^2*N_H
ΔP =  # error
Pot_f := Q_gas*ΔP
