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ΔP := -3*kg/cm^2
esp := 20 mm
V_f := 6 m^3
V_l := 1 m^3
μ_f := 0.01*poise
R_m := 0
t_filtrado := 1 hr
t_cargado := 2 min
t_armado := 6 min
t_lavado := □  # error: This placeholder is empty.
t_secado := 3 min
t_ciclo := t_filtrado + t_cargado + t_armado + t_lavado + t_secado  # error: This variable is undefined.
t_f == μ_f*α*C_s/(2*A_f^2*(-ΔP))*V_f^2
K := t_filtrado*2/V_f^2 = 3.33333 min/m^6
# Como la velocidad de lavado es igual a la de filtrado
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d/dV_f(t) == K*V
d/dt(V_f) == 1/(K*V_f)
V_l == t*2/(K*V_f)
t_lavado := K*V_l*V_f/2 = 10 min
