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μ_f := 1.27/100*poise
C_s := 0.9*kg/m^3
δ_susp := 1030*kg/m^3
A_f := 0.04 m^2
δ_sol := 1.59*gm/cm^3
ΔP := -300 kPa
K_2 := 2500*s/m^3
n := 0.3
K_1 := 11*10^6*s/m^6
ΔP_2 := -450 kPa
Q_m := 20000*kg/hr
# a) Determine las constantes de filtración
α := 2*K_1*A_f^2*(-ΔP)/(μ_f*C_s) = 9.23885e12 m/kg
R_m := K_2*A_f*(-ΔP)/μ_f = 2.3622e10 1/m
# b) Determine el caudal volumétrico de la suspención
Q_v := Q_m/δ_susp = 5.39374 L/s
# c) Determine el caudal volumétrico de sólidos en la suspención
Q_s := Q_v*C_s/δ_sol = 0.183184 L/min
# d) Calcular cual debería ser el área de filtración para procesar el caudal requerido a escala industrial
Given
A_i := 1.5 m^2
V_1 := 20000 kg/δ_susp = 19417.5 L
t_1 := 1 hr
t_1 == (μ_f*α*C_s/(2*A_i^2*(-ΔP_2))*V_1^2 + μ_f*R_m/(A_i*(-ΔP_2))*V_1)
A_i := Find(A_i) = 35.2354 m^2
# e) Determinar el valor de la resistencia media másica específica de la torta
α_1 == α_0*(ΔP_1/kPa)^n
α_0 := α/(-ΔP/kPa)^n = 1.6691e12 m/kg
# f) Calcular el valor de la resistencia media másica específica de la torta para la operación a escala industrial
α_2 := α_0*(-ΔP_2/kPa)^n = 1.04339e13 m/kg
# g) Determinar el tiempo (en minutos) que se requerirá para obtener 15 m3 de filtrado en las condiciones que se da el proceso a escala industrial
V_f := 15 m^3
t_f := μ_f*α_2*C_s/(2*A_i^2*(-ΔP_2))*V_f^2 + μ_f*R_m/(A_i*(-ΔP_2))*V_f = 2429.82 s
t_f = 40.497 min
# d) Calcular cual debería ser el área de filtración para procesar el caudal requerido a escala industrial
Given
t_1 == (μ_f*α_2*C_s/(2*A_2^2*(-ΔP_2))*V_1^2 + μ_f*R_m/(A_2*(-ΔP_2))*V_1)
A_2 := 1.5 m^2
A_2 := Find(A_2) = 37.4336 m^2
