# Worksheet setting: ORIGIN = 1
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D_i := 60 cm  # Metano Puro
P_1 := 6.8 atm
v_1 := 7*m/s
T_1 := 21 °C = 294.15 K
PM_CH4 := 16.043*gm/mol
# Suponer Gas Ideal
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ρ_CH4 := 0.1616*gm/cm^3  # disabled
μP := poise/1000
R_g := 0.082*L*atm/(mol*K)
coef_μCH4 := [3.8435; 0.411; -1.43*10^-4]
μ_CH4(T) := (coef_μCH4[1] + coef_μCH4[2]*T/K + coef_μCH4[3]*(T/K)^2)*μP
μ_CH4(T_1) = 112.366 μP
gm/mol/(L/mol) = 1 kg/m^3
V_M_id(T, P) := R_g*T/P
ρ_CH4(T, P) := PM_CH4/V_M_id(T, P)
ρ_CH4(T_1, P_1) = 4.52285 kg/m^3
S_t := π*D_i^2/4 = 0.282743 m^2
Q_v_1 := S_t*v_1
w := S_t*v_1*ρ_CH4(T_1, P_1) = 32225.9 kg/hr
V*dP + v*dv + E_f == -δW
v(T, P) := w/(S_t*ρ_CH4(T, P))
v(T_1, P_1) = 7 m/s
N_Re(T, P) := v(T, P)*D_i*ρ_CH4(T, P)/μ_CH4(T)
N_Re(T_1, P_1) = 1690.54
dvP_T(T, P) := d/dP(v(T, P))
dvP_T(T_1, P_1) = -1.01595 m/s*1/bar
rug_relat := 0
A_suc(T, P) := (2.457*ln(1/((7/N_Re(T, P))^0.9 + 0.27*rug_relat)))^16
B_suc(T, P) := (37530/N_Re(T, P))^16
0.045*mm/D_i = 7.5e-5
f_f(T, P) := 8*((8/N_Re(T, P))^12 + 1/(A_suc(T, P) + B_suc(T, P))^(3/2))^(1/12)
f_f(T_1, P_1) = 0.0378578
f_f2(T, P) := 4*(-3.6*log((rug_relat/3.7)^1.11 + 6.9/N_Re(T, P)))^-2
f_f2(T_1, P_1) = 0.0540703
L_1 := 16 km = 16000 m
integral(V_M_id(T_1, P)/PM_CH4, P = P_1 .. P_2) + integral(v(T, P)*dvP_T(T, P), P = P_1 .. P_2) + integral(f_f(T, P)*1/D_i*v(T, P)^2/2, L = 0 .. L_1) == 0
g_c := 9.8*m/s^2
integral(V_M_id(T_1, P)/PM_CH4, P = P_2 .. P_1) == W
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Coef_CpG := [34.942; -0.03996; 1.9184*10^-4; -1.530*10^-7; 3.9321*10^-11]
Cp_G(T) := Coef_CpG*[1; T/K; (T/K)^2; (T/K)^3; (T/K)^4]*J/(mol*K)
Cp_G(298 K) = 36.3312 J/(mol*K)
Cv_G(T) := Cp_G(T) + R_g
Cv_G(T_1) = 44.4956 J/(mol*K)
dVP_T(T, P) := d/dP(V_M_id(T, P))
c(T, P) := sqrt(-V_M_id(T, P)^2/PM_CH4*Cp_G(T)/Cv_G(T)*1/dVP_T(T, P))
c(T_1, P_1) = 351.985 m/s
v(T_1, P_1) = 7 m/s
coef_S_CH4 := [154.6; 0.113; -1.91*10^-5]
S_puroCH4(T) := coef_S_CH4*[1; T/K; (T/K)^2]*J/(mol*K)
S_puroCH4(T_1) = 186.186 J/(mol*K)
P := 4 atm
P_2 := root(integral(V_M_id(T_1, P)/PM_CH4, P = P_1 .. P) + integral(v(T_1, P)*dvP_T(T_1, P), P = P_1 .. P) + integral(f_f(T_1, P)/D_i*v(T_1, P)^2/2, L = 0 km .. L_1), P) = 5.0869 atm
P_2 = 5.0869 atm
# adiabatico - isoentrópico | La entropía se mantiene constante
S_G(T, P) == S_0 + S_puroCH4(T) - R_g*ln(P/bar)  # disabled  # Esta ecuación proviene de la definición de entropía donde
S(T, P) == S_f + integral(Cp(T)/T, T = T_0 .. T) + integral(T(d/dT(V)), P = P_0 .. P) == integral(Cp(T)/T, T = T_0 .. T) + integral(R_g/P, P = P_0 .. P)
S_puroCH4(T_1) = 186.186 J/(mol*K)
# A
T_0 := 298 K
P_0 := 1 atm
H_0 := 0
S_0 := 0
S_G(T, P) := S_0 + S_puroCH4(T) - R_g*ln(P/bar)
dST_P(T, P) := d/dT(S_G(T, P))  # cálculo de temperaturas para transformaciones adiabáticas
S_G1 := S_G(T_1, P_2) = 172.562 J/(mol*K)
T_a(P) := root(S_G(T_1, P_2) - S_G(T, P), T, 0 K, 500 K)
# Temperatura adiabática
T_1 = 294.15 K
T_a(P_1) = 317.955 K
T_2ad := T_a(P_1) = 317.955 K
T_11 := 10 K, 20 K .. 1000 K
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H_puro(T) := (Coef_CpG*[T/K; (T/K)^2*1/2; (T/K)^3*1/3; (T/K)^4*1/4; (T/K)^5*1/5] - Coef_CpG*[298; 298^2*1/2; 298^3*1/3; 298^4*1/4; 298^5*1/5])*J/mol
P_1 = 6.8 atm
H_G(T, P) := H_puro(T)
ΔH == Q - W
P_2 = 5.0869 atm
# Como el compresor es Adiabático
Q == 0
ΔH == -W == H(T_2ad, P_1) - H(T_1, P_2)
W := H_G(T_1, P_2) - H_G(T_2ad, P_1) = -872.29 J/mol  # Trabajo por mol realizado por el compresor
Potencia := w/PM_CH4*(H_G(T_1, P_2) - H_G(T_2ad, P_1)) = -652.7 hp
# En el enfriador
ΔH == Q - W
W == 0
ΔH == Q == H(T_1, P_2) - H(T_2ad, P_1)
Q := (H_G(T_2ad, P_1) - H_G(T_1, P_2)) = 872.29 J/mol
Q := (H_G(T_2ad, P_1) - H_G(T_1, P_2))*w/PM_CH4 = 486718 J/s  # Flujo de calor extraido en el enfriador
