Q := [0.01; 4.54; 9.08; 13.63; 18.17; 22.71; 27.5; 31.08]*m^3/hr
H := [33.5; 32.3; 27.4; 19.2; 12.5; 6.7; 3.7; 2.1]*m
η := [0; 29.2; 40; 45; 47; 48.3; 46.5; 40]
ρ := 0.85*gm/cm^3
μ := 0.6055/100*poise
P_1 := 1 atm
P_2 := P_1
ΔP := P_2 - P_1 = 0 Pa
Z_1 := 3.2 m = 3.2 m
Z_2 := 15.2 m
v_1 := 0
v_2 := 0
# Datos de la cañerìa
D_e := 88.9 mm
D_i := D_e - 2*5.49*mm = 0.07792 m
ε := 0.045 mm
L_S := 10.7 m
L_D := 33.5 m
Area := π*(D_i/2)^2 = 0.00476857 m^2
L_T := L_S + L_D
# no se usa, usamos el metodo de Crane
# CODOS 3 (succioón) 4 (descarga)
L_es := 3*2.5*m = 7.5 m
L_ed := 4*2.5*m = 10 m
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x := 0, 4.54/31.08*m^3/hr .. 31.08*(m^3/hr)
H_b(x) := interp(cspline(Q, H), Q, H, x)
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# Número de Reynolds
N_Re(Q) := D_i*ρ*Q/(μ*Area)
v_f(Q) := Q/Area
# Factor de fricción
f_T := 0.25/log(ε/D_i/3.7)^2
A_1(Q) := (2.457*ln(1/((7/N_Re(Q))^0.9 + 0.27*(ε/D_i))))^16
K_codo := 30*f_T = 0.517581
B_1(Q) := (37530/N_Re(Q))^16
f(Q) := 8*((8/N_Re(Q))^12 + 1/(A_1(Q) + B_1(Q))^(3/2))^(1/12)
f(10*m^3/hr) = 0.0220445
K_valv := 8.*f_T = 0.138022
E_f(Q) := (f(Q)*L_T/D_i + 7*K_codo + 2.*K_valv)*v_f(Q)^2/2
ΔP(Q) := E_f(Q)*ρ
L_T = 44.2 m
ΔP(Q) := E_f(Q)*ρ
H_S(Q) := (Z_2 - Z_1) + (v_f(Q)^2/(2*g)) + E_f(Q)/g
x_2 := 0, 4.54/31.08*m^3/hr .. 31.08*(m^3/hr)
Z_3 := 1.2 m + 15.2 cm = 1.352 m
x_3 := 0, 4.54/31.08*m^3/hr .. 31.08*(m^3/hr)
H_S2(Q) := (Z_2 - Z_3) + (v_f(Q)^2/(2*g)) + E_f(Q)/g
H_S(Q[5]) = 13.4451 m
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# Para tanque lleno
Q_b := 17*(m^3/hr)
Given
H_b(Q_b) == H_S(Q_b)
Q_op := Find(Q_b)
Q_op = 17.8732 m^3/hr
H_b(Q_op) = 12.9113 m
# Para tanque vacìo
Given
H_b(Q_b) == H_S2(Q_b)
Q_op2 := Find(Q_b)
Q_op2 = 16.6233 m^3/hr
H_b(Q_op2) = 14.641 m
Q_promedio := (Q_op + Q_op2)/2 = 17.2482 m^3/hr
V_tanque := 38 m^3
t_descarga := V_tanque/Q_promedio = 2.20312 hr
## Geometría del tanque cisterna
D_T := 2 m  # del grafico
R_T := D_T/2 = 1 m
A_f(h) := R_T^2*acos((R_T - h)/R_T) - (R_T - h)*sqrt(2.*R_T*h - h^2)  # del libro pag 98 RoT
V_T(h, L_T) := A_f(h)*.*L_T
L_T := root(V_tanque - V_T(D_T, L_T)*0.8, L_T, 0 m, 16 m)  # error: The function values on the end points must be of opposite signs.
