# Worksheet setting: ORIGIN = 1
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m_p := 50000 tonne
# Datos tanques de almacenamiento (punto 2)
D_T := 30 m
P_2 := 100 kPa = 1 bar
# Dimensiones tanques barco
L_1 := 25 m
L_2 := 25 m
N_b := 20
P_1 := 30 psi + 1 bar = 3.06843 bar
L_T := 1.5 km  # Cañería Acero comercial 12" SCH 40S
d_e := 323.85 mm
e := 9.52 mm
d_i := d_e - 2*e = 304.81 mm
ε := 0.045 mm  # Rugosidad relativa del aceroo comercial
# Propiedades termofisicas
ρ_p == densidad_petroleo
ρ_p := 842.54*kg/m^3
μ_p == viscosidad_petroleo
μ_p := 2.53*10^-3*kg/(m*s)
# Cálculo de Altura de carga del sistema vs Caudal
V_t == volumen_tanque_buque
f_T == f_Régimen_Turbulento_Total
# Del isométrico
# 7 codos estandar a 90°
# 2 codos a 45°
# Entrada y salida de tanques
f_T(d_i) := 0.25/log(ε/d_i/3.7)^2
K_codo90(d_i) := 30*f_T(d_i)
K_codo90(d_i) = 0.38757  # Tenemos 9 codos estándar a 90°
K_codo45(d_i) := 16*f_T(d_i)
K_codo45(d_i) = 0.206704  # Tenemos 2 codos estándar a 45°
K_outTK := 1  # Salida de cañería PROYECTADA, BORDE AGUDO O REDONDEADA.
K_inTK := 0.78  # Entrada proyectada hacia adentro
# Volumen de cada tanque de descarga o de depósito | Altura del líquido dentro de cada tanque del Buque
N_t := 4
S_t_b := L_1*L_2  # Sección transversal tanques del buque
V_T(L_tanque) := π*D_T^2/4*L_tanque*N_t
V_t_b(H_t_b) := N_b*L_1*L_2*H_t_b  # Volumen en los 20 tanques del buque
V_T(L_tanque) := m_p/ρ_p
m_p/ρ_p == N_b*L_1*L_2*H_t_bmax
func(L_tanque) := π*D_T^2/4*L_tanque*N_t - m_p/ρ_p
H_t_bmax := m_p/(L_1*L_2*N_b*ρ_p) = 4.74755 m
L_tanque := 0.5 m
H_tanque := root(func(L_tanque), L_tanque)
f(H_t_b) := H_t_b - m_p/(ρ_p*N_b*L_1*L_2)
H_tanque = 20.9888 m  # Altura de líquido en cada tanque cuando cada tanque del buque se vació
H_t_b := 0.5 m
Z_t_terminal := 10 m
H_t_bmax := root(f(H_t_b), H_t_b) = 4.74755 m
Z_1 := -15 m = -15 m  # Altura máxima de líquido en cada tanque del buque
Z_3 := Z_t_terminal + H_tanque = 30.9888 m
Z_11 := Z_1 + H_t_bmax = -10.2525 m
# Cálculo de las pérdidas por fricción para tubería y accesorios
S_tube := π*d_i^2/4
v_f(Q) := Q/S_tube
N_Re(Q) := v_f(Q)*d_i*ρ_p/μ_p
A(Q) := (2.457*ln(1/((7/N_Re(Q))^0.9 + 0.27*(ε/d_i))))^16
B(Q) := (37530/N_Re(Q))^16
f(Q) := 8*((8/N_Re(Q))^12 + 1/(A(Q) + B(Q))^(3/2))^(1/12)
K_tube(Q) := f(Q)*L_T/d_i
E_f(Q) := (K_tube(Q) + 7*K_codo90(d_i) + 2*K_codo45(d_i) + K_inTK + K_outTK)*(1/2*v_f(Q)^2)
H_T(Q) := (P_2 - P_1)/(ρ_p*g) + Z_3 - Z_1 + 1/2*v_f(Q)^2/g + E_f(Q)/g
H_T1(Q) := ((P_2 - P_1)/(ρ_p*g) + Z_3 - Z_11 + 1/2*v_f(Q)^2/g + E_f(Q)/g)
H_T2(Q) := ((P_2 - P_1)/(ρ_p*g) + Z_t_terminal - Z_11 + 1/2*v_f(Q)^2/g + E_f(Q)/g)
Q := 0*gal/min, 10*gal/min .. 6000*gal/min
Q_1 := 100*gpm
Given
# La bombas juntas entregan 30 metros, esto significa que yo debo trabajar a un caudal un 20% menor que esos 90m, por lo tanto serían 72m, pero ya con la válvula controlando, con ese dato el caudal del punto de operación es 4019.8 gpm
72 m == (P_2 - P_1)/(ρ_p*g) + Z_3 - Z_1 + 1/2*v_f(Q_1)^2/g + E_f(Q_1)/g
Q_v := Find(Q_1) = 4029.09 gallons_per_minute
H_T(Q_v) = 72 m  # Es la situación cuando los tanques del buque están vacíos y los de descarga se encuentran llenos y descargo a Z=31 m
H_T1(Q_v) = 67.2525 m  # Es la situación cuando los tanques del buque están llenos y los de descarga se encuentran vacíos pero descargo a Z=31 m
H_T2(Q_v) = 46.2637 m  # Es la situación cuando los tanques del buque están llenos y los de descarga se encuentran acíos pero descargo a Z=10 m
# Si las bombas son 3 de 30 metros cada una
H_bombas == 30 m
Q_op_90 := 4883.1*gpm
Q_2 := 100*gpm
Given
90 m == (P_2 - P_1)/(ρ_p*g) + Z_3 - Z_1 + 1/2*v_f(Q_2)^2/g + E_f(Q_2)/g
Q_v2 := Find(Q_2) = 4724.92 gallons_per_minute
Q_t := Q_v2  # Caudal de trabajo establecido a partir de saber que las bombas son de 30 m cada una
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