# Worksheet setting: ORIGIN = 1
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Q := [0.01; 4.5; 9.1; 13.6; 18.2; 22.7; 27.3; 31.8; 36.3]*m^3/hr
H := [85.3; 79.2; 67.1; 48.8; 33.5; 19.2; 8.5; 3.1; 1.5]*m
η := [0; 45; 60; 60; 56; 50; 43; 37; 30]
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H_bom(x) := [1; x; x^2; x^3]
H_b(x) := interp(cspline(Q, H), Q, H, x)
Coef_ajuste := linfit(Q/(m^3/hr), H/m, H_bom) = [86.1418; -1.10994; -0.158931; 0.00346983]
H_bomba(Q) := Coef_ajuste*H_bom(Q/(m^3/hr))*m
x := 0, 4.5/36.3*m^3/hr .. 36.3*m^3/hr
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# Tubo 3 in SCH40
## Longitud de la cañería
## Diámetro interno de la cañería
L_s := 55 m
L_d := 213 m
d_ext := 88.9 mm
ε := 0.045 mm  # Rugosidad absoluta acero comercial
espesor := 5.49 mm
L_T := L_s + L_d = 268 m
d_i := d_ext - 2*espesor = 0.07792 m
## Propiedades del sistema
ρ := 1*gm/cm^3
μ := 0.01*poise
ρ_esp := ρ/ρ
Area := π*(d_i/2)^2 = 0.00476857 m^2
P_1 := 1 atm
P_2 := P_1
h_1 := 3.05 m
h_2 := 22.9 m
## Número de Reynolds en función del caudal
N_Re(Q) := d_i*ρ*Q/(μ*Area)
v_f(Q) := Q/Area
N_Re(10*(m^3/s)) = 163403432
v_f(10*L/s) = 2.09707 m/s
## Factor de fricción para tuberías. Ec de Churchill
A_1(Q) := (2.457*ln(1/((7/N_Re(Q))^0.9 + 0.27*(ε/d_i))))^16
f_T := 0.25/log(ε/d_i/3.7)^2
K_codo := 30*f_T = 0.517581
B_1(Q) := (37530/N_Re(Q))^16
f(Q) := 8*((8/N_Re(Q))^12 + 1/(A_1(Q) + B_1(Q))^(3/2))^(1/12)
f(10*m^3/hr) = 0.0232571
E_f(Q) := (f(Q)*L_T/d_i + 5*K_codo)*v_f(Q)^2/2
ΔP(Q) := E_f(Q)*ρ
L_T = 268 m
H_S(Q) := (h_2 - h_1) + (v_f(Q)^2/(2*g)) + E_f(Q)/g
E_f_con_valv(Q) := (f(Q)*L_T/d_i + 5*K_codo)*(Q*m^3/hr/Area)^2/2
H_S(Q[5]) = 24.2454 m
x_1 := 0, 4.5/36.3*m^3/hr .. 36.3*m^3/hr
Q_r := Q
Q_b := 20*m^3/hr
Given
H_b(Q_b) == H_S(Q_b)
Q_op := Find(Q_b)
Q_op = 20.681 m^3/hr  # Caudal en el punto de operación.
H_b(Q_op) = 25.4372 m
H_b(Q[5]) - H_S(Q[5]) = 9.25459 m  # Esta sería la caída de presión, en metros, que genera la válvula
H_b(Q[5]) = 33.5 m  # Altura de carga entregada por la bomba al Q5 de trabajo
x_2 := 0, 4.5/36.3*m^3/hr .. 36.3*m^3/hr
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P_1_in := H_b(Q[5])*ρ*g = 328.523 kPa
Q[5] = 18.2 m^3/hr
P_2_out := H_S(Q[5])*ρ*g = 237.766 kPa
P_2 = 101.325 kPa
# Cálculo punto a punto - Valuado en Q5
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L_T := (35 + 2 + 18 + 167 + 25 + 19 + 2)*m = 268 m
h_2(x) :=
    3.05 m if x == 0 m
    2 m if 0 m < x < 35 m
    (2 m - (x - 35 m)) if 35 m ≤ x ≤ 37 m
    0 m if 37 m < x ≤ (35 + 18 + 2 + 167)*m
    0 m + (x - (35 + 18 + 2 + 167)*m) if (35 + 18 + 2 + 167)*m < x ≤ (35 + 18 + 2 + 167 + 25)*m
    (25 m) if (35 + 18 + 2 + 167 + 25)*m < x ≤ (35 + 18 + 2 + 167 + 25 + 19)*m
    (25 m - (x - (35 + 18 + 2 + 167 + 25 + 19)*m)) if (35 + 18 + 2 + 167 + 25 + 19)*m < x ≤ L_T
D_int(x) :=
    d_i if x < 55 m
    d_i otherwise
v_2(x) :=
    Q[5]/(π*(D_int(x)/2)^2) if x ≤ L_T
    (0*m/s) otherwise
v_1 := Q[5]/Area = 1.06018 m/s
f_1 := f(Q[5]) = 0.0212567
E_f(x) :=
    (f_1*x/D_int(x)*v_2(x)^2/2) if x < 35 m
    ((f_1*x/D_int(x) + K_codo)*v_2(x)^2/2) if 35 m ≤ x < 37 m
    ((f_1*x/D_int(x) + 2*K_codo)*v_2(x)^2/2) if 37 m ≤ x < 222 m
    ((f_1*x/D_int(x) + 3*K_codo)*v_2(x)^2/2) if 222 m ≤ x < 247 m
    ((f_1*x/D_int(x) + 4*K_codo)*v_2(x)^2/2) if 247 m ≤ x < 266 m
    ((f_1*x/D_int(x) + 5*K_codo)*v_2(x)^2/2) if 266 m ≤ x ≥ L_T
E_f(L_T) = 42.5422 m^2/s^2
H_bomb := H_b(Q[5]) = 33.5 m
H_B(x) :=
    0 m if x < 55 m
    H_bomb otherwise
L_rango := 0 m, 0.5 m .. L_T
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(z_2 + P_2/(ρ*g) + v_2^2/(2*g)) == (z_1 + P_1/(ρ*g) + v_1^2/(2*g)) + H_B - h_f
# Presión en cualquier punto del sistema, al caudal de Trabajo Q.5 con la bomba instalada
P_2(x) := ((h_1 + P_1/(ρ*g) + (0*m/s)^2/(2*g)) + H_B(x) - E_f(x)/g - h_2(x) - v_2(x)^2/(2*g))*ρ*g
# Presión en cualñquier punto del sistema, al caudal de Trabajo Q.5, sin la bomba instalada.
P_2SB(x) := ((h_1 + P_1/(ρ*g) + (0*m/s)^2/(2*g)) - E_f(x)/g - h_2(x) - v_2(x)^2/(2*g))*ρ*g
# Gráfica de Presiones a lo largo de la cañería al caudal de Trabajo Q5
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P_2(L_T) - P_1 = 89.7759 kPa  # Este es el ΔP requerido disponible que debe generar la válvula dentro del sistema propuesto y al caudal de trabajo seleccionado.
(P_2(L_T) - P_1)/(ρ*g) = 9.15459 m
# Se seleccionó de la tabla de válvulas de Equipos para Procesos Químico una válvula Globo de Asiento Simple con cierre v-Skirt
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# Considerando inicialmenteque no tenemos accesorios 2 diámetros (2D) aguas arriba de la válvula y 6D aguas abajo de la válvula el FP es 1
# Datos de la válvula seleccionada
C_d_disponible := 9  # Valor dado por el fabricante para ésta válvula
F_L := 0.9  # FL (Factor de recuperación de la presión)
D_v == 3 in  # Considero inicialmente que la válvula es del mismo tamaño que la cañería
F_P1 := 1
# Inicialmente es 1, luego se calcula por iteración - Fp es el Factor de geometría de la tubería que tiene en cuenta la capacidad de flujo reducida debido a la pérdida de carga a través de accesorios
ΔP_v_disp := P_1_in - P_2_out = 90.7565 kPa  # Dato extraído de la gráfica de H vs Q
ΔP_disponible_valv := P_2(L_T) - P_1 = 89.7759 kPa  # Dato extraído de la gráfica Presión vs Longitud de cañería
F_L := sqrt((P_1_in - P_2_out)/(P_1_in - P_vc))  # disabled  # Explicación de este factor del Libro Equipos para...
# ------------------------------------------------>
# La explicación de esta ecuación también está en Crane-2013, capitulo 3, pág 3-2 (Pag 44 y 45 del libro en .pdf)
C_v_requerido := Q[5]/gpm/(F_P1*sqrt(ΔP_v_disp/psi/ρ_esp)) = 22.0865
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P_v := 4297 Pa
P_critica := 22.09 MPa
F_F := 0.96 - 0.28*sqrt(P_v/P_critica) = 0.956095  # Factor de relación de presión crítica del líquido
C_v_disponible(D_v) := C_d_disponible*(D_v/in)^2
C_vdispon := C_d_disponible*2^2 = 36
# Si considero colocar una válvula de 2 in, entonces estoy decidiendo por una válvula con una capacidad un 63% por encima de la requerida.
C_vdispon/C_v_requerido = 1.62995
D_valv := 1 in
Given
C_v_disponible(D_valv)/C_v_requerido == 1.25
# De esta manera yo puedo suponer la mínima capacidad para la válvula a seleccionar y de acuerdo a eso ver si el diámetro funciona. El rango debería estar en 1.25 y 2
D_v_calculada := Find(D_valv)
D_v_calculada = 1.75145 in
# Iteración 1
D_v_calc := (1 + 3/4)*in = 1.75 in
D_v_selec := D_v_calc
d_nom_in := 3 in
d_nom_out := 3 in
# Si Considero poner una válvula de 1 3/4", lo que tendré reductores a la entrada y a la salida.
K_in_red := 0.5*(1 - (D_v_selec/d_nom_in)^2)^2 = 0.217617
K_out_red := 1*(1 - (D_v_selec/d_nom_out)^2)^2 = 0.435233
K_in_out := 1.5*(1 - (D_v_selec/d_nom_in)^2)^2 = 0.65285
K_B_in := (1 - (D_v_selec/d_nom_in)^4) = 0.884211
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K_B_out := K_B_in
ΔP_red_in := (K_in_red + K_B_in)*Q[5]^2*ρ_esp*kg/m^3/D_v_selec^4  # Caida de presión dada por la reducción de entrada
ΔP_red_out := (K_out_red - K_B_out)*Q[5]^2*ρ_esp*kg/m^3/D_v_selec^4  # Caída de presiión dada por la reducción de salida
# La deducción de estas caídas de presión surge de aplicar el método de Crane para el cálculo de los K de cada reductor.
# Necesitamos las presiones a la entrada y salida de la Válvula para determinar el nuevo ΔPv ahora considerando reductores de entrada y salida o bien como la ΔPd es nuestra caída de presión disponible, por lo tanto, determinando ΔPred_in y ΔPred_out podremos determinar la ΔPv
ΔP_red_in = 7.21381 Pa
ΔP_red_out = -2.93951 Pa
ΔP_v_nuevo := ΔP_v_disp - (ΔP_red_in + ΔP_red_out) = 90.7523 kPa
p_1
# Es la presión a la entrada de la válvula
p_0 == P_2(60 m)  # es la presión a la entrada de la reducción
p_1_1 := P_2(60 m) - (K_B_in + K_in_red)*Q[5]^2*ρ_esp*kg/m^3/D_v_selec^4 = 449.408 kPa
# Realizo el nuevo cálculo del Cv requerido ahora para la nueva caida de presión de la válvula
C_v_requerido_2 := Q[5]/gpm/(F_P1*sqrt(ΔP_v_nuevo/psi/ρ_esp)) = 22.0871
# De acuerdo a la condición de estrangulamiento, no tendría estrangulamiento por lo que podría usar una válvula de 3 in
# si la ΔPmax hubiera sido menor que la ΔPv admisible, entonces debería recalcular el Cv con el valor de ΔPv adm.
# Si ΔPmax es menor que la presión diferencial real a través de la válvula, se producirán condiciones de flujo obstruido
ΔP_max := F_L^2*(p_1_1 - F_F*P_v) = 360.693 kPa
C_v_disponible(D_v_selec)/C_v_requerido_2 = 1.2479
# Con esto se observa que a pesar de que no hay estrangulamiento, la válvula se encuentra muy en el límite de capacidad propuesto, por lo que nos vamos al Diámetro siguiente superior o sea 2 in
# Iteración 2
D_v_calc2 := 2 in = 2 in
D_v_selec2 := D_v_calc2
d_nom_in := 3 in
d_nom_out := 3 in
# Si Considero poner una válvula de 1 3/4", lo que tendré reductores a la entrada y a la salida.
K_in_red2 := 0.5*(1 - (D_v_selec2/d_nom_in)^2)^2 = 0.154321
K_out_red2 := 1*(1 - (D_v_selec2/d_nom_out)^2)^2 = 0.308642
K_in_out2 := 1.5*(1 - (D_v_selec2/d_nom_in)^2)^2 = 0.462963
K_B_in2 := (1 - (D_v_selec2/d_nom_in)^4) = 0.802469
K_B_out2 := K_B_in2
ΔP_red_in2 := (K_in_red2 + K_B_in2)*Q[5]^2*ρ_esp*kg/m^3/D_v_selec2^4  # Caida de presión dada por la reducción de entrada
ΔP_red_out2 := (K_out_red2 - K_B_out2)*Q[5]^2*ρ_esp*kg/m^3/D_v_selec2^4  # Caída de presiión dada por la reducción de salida
ΔP_red_in2 = 3.67197 Pa
ΔP_red_out2 = -1.89521 Pa
ΔP_v_nuevo2 := ΔP_v_disp - (ΔP_red_in2 + ΔP_red_out2) = 90.7548 kPa
p_1
# Es la presión a la entrada de la válvula
p_0 == P_2(60 m)  # es la presión a la entrada de la reducción
p_1_2 := P_2(60 m) - (K_B_in2 + K_in_red2)*Q[5]^2*ρ_esp*kg/m^3/D_v_selec2^4 = 449.412 kPa
# Realizo el nuevo cálculo del Cv requerido ahora para la nueva caida de presión de la válvula
C_v_requerido_2 := Q[5]/gpm/(F_P1*sqrt(ΔP_v_nuevo2/psi/ρ_esp)) = 22.0867
# De acuerdo a la condición de estrangulamiento, no tendría estrangulamiento por lo que podría usar una válvula de 3 in
# si la ΔPmax hubiera sido menor que la ΔPv admisible, entonces debería recalcular el Cv con el valor de ΔPv adm.
# Si ΔPmax es menor que la presión diferencial real a través de la válvula, se producirán condiciones de flujo obstruido
ΔP_max := F_L^2*(p_1_2 - F_F*P_v) = 360.696 kPa
# Con esto se observa que a la válvula de 2 in cumple con todas las condiciones
C_v_disponible(D_v_selec2)/C_v_requerido_2 = 1.62994
