# Problema N°3
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# El sentido que se estableció para los caudales es de derecha a izquierda y de arriba hacia abajo.
ORIGIN ≡ 0
# Se establece el origin en cero, para poder calcular el Q.0.
# Con subindice matricial "Cero (0)" en el balance de masa de cada nodo.
# DATOS
μ := 0.00089*(N*s/m^2)
ρ_H2O := 1000*(kg/m^3)
ε := 4*10^-5*m
g_c := 9.8*(m/s^2)
L_c := [0; 600; 600; 400; 400; 400; 600; 600]*m  # m
D_c := [0; 0.3; 0.3; 0.25; 0.25; 0.25; 0.3; 0.3]*m
h := [0; 0; 0; 0; 0; 0; 0; 0]*m
# Se genera una matriz de 8 filas para establecer los datos de las 7 corrientes, debido a que tenemos el origin en cero, asi el primer elemento de la matriz no lo debemos considerar y lo anulamos  explicitando un valor nulo.
# De esta manera el elemento uno de la matriz se va a corresponder con el tramo 1 de cañeria, la fila  2 con la cañeria 2 y asi sucesivamente.
# Demostración:
L_c[0] = 0 m
L_c[1] = 600 m
L_c[2] = 600 m
P := [0; 1; 1; 1; 1; 1; 4.5]*bar  # Se poseen tantas presiones como nodos tenga el sistema. El numero de filas de la matriz es 7, porque el origin es 0.
PP := P
S_t(D) := π*D^2/4
v(Q, D) := Q/S_t(D)
N_Re(Q, D) := D*v(Q, D)*ρ_H2O/μ
# Pérdidas por fricción
A_1(Q, D) := (2.457*ln(1/((7/N_Re(Q, D))^0.9 + 0.27*(ε/D))))^16
B_1(Q, D) := (37530/N_Re(Q, D))^16
f_2(Q, D) := 8*((8/N_Re(Q, D))^12 + 1/(A_1(Q, D) + B_1(Q, D))^(3/2))^(1/12)
f_2(Q, D)*L/D*1/2*|Q|*Q/(g_c*S_t(D)^2)
# Valores Iniciales
Q := [0.5; 0.5; 0.5; 0.5; 0.5; 0.5; 0.5; 0.5; 0.1; 0.1; 0.1; 0.1]*m^3/s
QQ := Q
Given
# NODOS
# N.A
Q[0] == Q[1] + Q[3]
# N.B
Q[1] == Q[2] + Q[4]
# N.C
Q[2] == QQ[8] + Q[5]
# N.D
Q[3] == QQ[9] + Q[6]
# N.E
Q[4] + Q[6] == Q[7] + QQ[10]
# El termino de energia cinetica lo omitimos en la ecuación de Bernoulli, debido a que el diametro de la cañeria no cambia. Por lo tanto no cambia la velocidad y se mantiene cte.
# N.F
QQ[11] == Q[7] + Q[5]
# CAÑERIAS
# C.AB
h[2] - h[1] + (P[2] - P[1])/(ρ_H2O*g_c) + f_2(Q[1], D_c[1])*L_c[1]/D_c[1]*1/2*|Q[1]|*Q[1]/(g_c*S_t(D_c[1])^2) == 0
# C.BC
h[3] - h[2] + (P[3] - P[2])/(ρ_H2O*g_c) + f_2(Q[2], D_c[2])*L_c[2]/D_c[2]*1/2*|Q[2]|*Q[2]/(g_c*S_t(D_c[2])^2) == 0
# C.AD
h[4] - h[1] + (P[4] - P[1])/(ρ_H2O*g_c) + f_2(Q[3], D_c[3])*L_c[3]/D_c[3]*1/2*|Q[3]|*Q[3]/(g_c*S_t(D_c[3])^2) == 0
# C.BE
h[5] - h[2] + (P[5] - P[2])/(ρ_H2O*g_c) + f_2(Q[4], D_c[4])*L_c[4]/D_c[4]*1/2*|Q[4]|*Q[4]/(g_c*S_t(D_c[4])^2) == 0
# C.CF
h[6] - h[3] + (PP[6] - P[3])/(ρ_H2O*g_c) + f_2(Q[5], D_c[5])*L_c[5]/D_c[5]*1/2*|Q[5]|*Q[5]/(g_c*S_t(D_c[5])^2) == 0
# C.DE
h[5] - h[4] + (P[5] - P[4])/(ρ_H2O*g_c) + f_2(Q[6], D_c[6])*L_c[6]/D_c[6]*1/2*|Q[6]|*Q[6]/(g_c*S_t(D_c[6])^2) == 0
# C.FE
h[6] - h[5] + (PP[6] - P[5])/(ρ_H2O*g_c) + f_2(Q[7], D_c[7])*L_c[7]/D_c[7]*1/2*|Q[7]|*Q[7]/(g_c*S_t(D_c[7])^2) == 0
[Q; P] := Find(Q, P)
Q = [0.4; 0.219564; 0.130484; 0.180436; 0.0890799; 0.0304842; 0.0804359; 0.0695158; 0.1; 0.1; 0.1; 0.1] m^3/s
P = [0; 6.39177; 5.0481; 4.55303; 4.84831; 4.65042; 4.5] bar
