# Worksheet setting: ORIGIN = 1
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Q := [0; 4.54; 9.08; 13.63; 18.17; 22.71; 27.25; 31.08]*m^3/hr
H := [33.5; 32.3; 27.4; 19.2; 12.5; 6.7; 3.7; 2.1]*m
η(%) := [0; 29.2; 40; 45; 47; 48.3; 46.5; 40]
H_bom(x) := [1; x; x^2; x^3]
H_b(x) := interp(cspline(Q, H), Q, H, x)
Coef_ajuste := linfit(Q/(m^3/hr), H/m, H_bom) = [33.7975; 0.0277195; -0.109969; 0.00246956]
H_bomba(Q) := Coef_ajuste*H_bom(Q/(m^3/hr))*m
H_bomba(10*m^3/hr) = 25.5474 m
H_b(10*m^3/hr) = 25.863 m
ΔP := 0
ρ_B := 0.85*gm/cm^3
μ_B := 0.6/100*poise
V_T.esp := 38 m^3
# Los codos utilizados son codos estandar a 90°
D_e := 3.5 in
esp := 0.216 in  # Cañería de 3 in Sch 40
# Válvula de compuerta o esclusa | para β=1; θ=0
D_i := D_e - 2*esp = 77.9272 mm
# Rugosidad absoluta
ε := 0.045 mm
S_caño := π*D_i^2/4 = 0.00476945 m^2
v_f(Q) := Q/S_caño
V_1 := 0*m/s
V_2(Q) := Q/S_caño
## Número de Reynolds en función del caudal
N_Re(Q) := D_i*ρ_B*Q/S_caño/μ_B
N_Re(10*m^3/hr) = 64296.3
# Pérdidas por fricción
# Pérdidas por fricción en accesorios
f_T := 0.25/log(ε/D_i/3.7)^2
K_codo := 30*f_T = 0.51757
K_valv_comp := 8*f_T = 0.138019
# Pérdidas por fricción en cañería
A(Q) := (2.457*ln(1/((7/N_Re(Q))^0.9 + 0.27*(ε/D_i))))^16
B(Q) := (37530/N_Re(Q))^16
f(Q) := 8*((8/N_Re(Q))^12 + 1/(A(Q) + B(Q))^(3/2))^(1/12)
f(10*m^3/hr) = 0.0220149
# Lado Succión | Lado Descarga
L_s := 10.7 m
L_d := 33.5 m
K_Tube(Q) := f(Q)*L_s/D_i
E_f_s(Q) := 1/2*Q^2/S_caño^2*(K_Tube(Q) + 3*K_codo + K_valv_comp)
E_f_d(Q) := 1/2*Q^2/S_caño^2*(K_Tube(Q) + 4*K_codo + K_valv_comp)
E_f_s(10*m^3/hr) = 0.799423 m^2/s^2
E_f_d(10*m^3/hr) = 0.887204 m^2/s^2
E_f_T(Q) := E_f_s(Q) + E_f_d(Q)
# Escenario 1 - Suponiendo el tanque cisterna LLENO
h_1_1 := 3.2 m
h_2_1 := 15.2 m  # h_1_1  # altura del punto 1, escenario 1
# h_2_1 | altura del punto 2, escenario 1
.
H_1(Q) := (h_2_1 - h_1_1) + V_2(Q)^2/(2*g) + E_f_T(Q)/g
H_1(10*m^3/hr) = 12.1893 m
H_1(31.08*m^3/hr) = 13.7053 m
# Escenario 2 - Suponiendo el tanque cisterna casi VACÍO
h_1_2 := 1.2 m + 15.2 cm
h_2_2 := 15.2 m  # h_1_2  # Altura del punto 1, escenario 2
# h_2_2 | Altura del punto 2, escenario 2
H_2(Q) := (h_2_2 - h_1_2) + V_2(Q)^2/(2*g) + E_f_T(Q)/g
H_2(10*m^3/hr) = 14.0373 m
Q_1 := 0, 2*m^3/hr .. 36*m^3/hr
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H_b(Q) - ((h_2_1 - h_1_1) + V_2^2/(2*g) + E_f_T(Q)/g) == 0
Q_1(z) := root(H_b(Q) - ((h_2_1 - h_1_1) + V_2(Q)^2/(2*g) + E_f_T(Q)/g), Q, 1*m^3/hr, 140*m^3/hr)
Q_1(1.9 m) = 18.1015 m^3/hr
H_b(Q) - ((h_2_2 - h_1_2) + V_2(Q)^2/(2*g) + E_f_T(Q)/g) == 0
Q_2(z) := root(H_b(Q) - ((h_2_2 - h_1_2) + V_2(Q)^2/(2*g) + E_f_T(Q)/g), Q, 1*m^3/hr, 140*m^3/hr)
Q_2(1.9 m) = 16.82 m^3/hr
z_1 := 0, 4.6 m/6.1 .. 4.6 m
15 ft = 4.572 m
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20 ft = 6.096 m
# Tanque horizontal de bases planas
V_T.esp := 38 m^3  # Volumen especificado dentro del tanque cisterna
# Geometria del tanque cisterna
D_T := 2 m = 2 m
R_T := D_T/2 = 1 m
root(H_1(Q) - H_b(Q), Q, 1*m^3/hr, 50*m^3/hr) = 18.1015 m^3/hr
A_f(h) := R_T^2*acos((R_T - h)/R_T) - (R_T - h)*sqrt(2*R_T*h - h^2)  # Rules of Thumbs, tabla 5.2, pp. 85
V_T(h, L_T) := A_f(h)*L_T
V_T(2 m, 2 m) = 6283.19 L
root(H_2(Q) - H_b(Q), Q, 1*m^3/hr, 50*m^3/hr) = 16.82 m^3/hr
L_T := root(V_T.esp - V_T(D_T, L_T)*0.8, L_T, 0 m, 16 m) = 15.1197 m
h_max := root(V_T(h, L_T) - 38 m^3, h, 0 m, 10 m) = 1.49186 m
# h.max = Altura máxima de líquido dentro del tanque a t0=0
(18.102*m^3/hr + 16.82*m^3/hr)/2 = 17.461 m^3/hr
0.8*π*D_T^2/4*L_T = 38 m^3
# h0 = es la altura de hmax + la altura de la base del tanque al eje 0 (bomba)
38 m^3/(17.461*m^3/hr) = 130.577 min
V_T(h) := A_f(h)*L_T
h_2_1 = 15.2 m
h_1_1 = 3.2 m
ΔP := 0 kPa
(ΔP/ρ + g*(h_2 - h_1) + E_f(Q)) - H_bomba(Q)*g == 0
f(Q) := g*(h_2_1 - h_1_1) + 1/2*V_2(Q)^2 + E_f_T(Q) - H_b(Q)*g
f(9.08*m^3/hr) = -149.48 m^2/s^2
root(g*(h_2_1 - h_1_1) + E_f_T(Q) - H_b(Q)*g, Q, 1*m^3/hr, 50*m^3/hr) = 18.1408 m^3/hr
Q_1 := 0*m^3/hr, 1*m^3/hr .. 50*m^3/hr
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Q_v(h) := root(g*(h_2_1 - h) + E_f_T(Q) - H_b(Q)*g, Q, 1*m^3/hr, 50*m^3/hr)
h_a := 5 m, 5.1 m .. 10 m
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t := integral(-1/Q_v(h)*(d/dh(V_T(h - (1.2 m + 15.2 cm)))), h = h_max + 1.2 m .. 1.2 m + 15.2 cm) = 116.814 min
