R_g := 0.082*atm*L/(mol*K)
Vm(T, P) := R_g*T/P
ρ(PM, T, P) := PM/Vm(T, P)
μP := poise/10^6
μ(A, B, C, T) := (A + B*T/K + C*(T/K)^2)*μP
Cp_G(A, B, C, D, E, T) := (A + B*T/K + C*(T/K)^2 + D*(T/K)^3 + E*(T/K)^-4)*J/(mol*K)
S_G(A, B, C, T) := (A + B*T/K + C*(T/K)^2)*J/(mol*K)
