# Fórmulas agitación
s_1 := □
# Diam del impulsor
# --------------------
# Diam del tanque
# Distancia del impulsor al fondo del tanque
# --------------------
# Diámetro del impulsor
s_2 := □
s_3 := □
# Largo de la paleta del impulsor
# -----------------------------------
# Diámetro del impulsor
s_4 := □
# Ancho de la peleta del impulsor
# ------------------------------------
# Diámetro del impulsor
s_5 := □
# Ancho de la placa deflectora
# --------------------------------
# Diámetro del tanque
s_6 := □
# Altura del líquido
# --------------------
# Diámetro del tanque
V_t := □
ρ := □
μ := □
D_i := s_1*D_t  # D.t Diámetro del tanque  # D.i Diámetro del impulsor
# C.i Distancia del impulsor al fondo del tanque
C_i := s_2*D_i
# L.p Largo de las paletas del impulsor
L_P := s_3*D_i
# W.p Ancho de las paletas del impulsor
W_p := s_4*D_i
B := s_5*D_t  # B Ancho de los bafles o placas deflectoras
H_L := s_6*D_t  # H.L Altura del líquido
V_t == π/4*D_t^2*H_T  # H.T Altura del tanque (generalmente 1.2H.L)
V_L == π/4*D_t^2*H_L  # V.t Volumen del tanque  V.L Volumen del líquido
L_e := H_T - C_i  # L.e Largo del eje del agitador
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N_p := □  # n.p Número de potencia, lo elegimos de la tabla
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P_vol := □  # Potencia por unidad de volumen, de tabla, depende si es con trasnferencia de calor o no.
P_L := P_vol*V_L  # P.L Potencia suministrada al fluido
P_M := 1.4*P_L  # P.M Potencia del motor, generalmente es un 40% mayor a la potencia suministrada al fluido
# La potencia suministrada al fluido también puede calcularse como:
P_L == N_p*N_a^3*D_i^5*ρ  # N.a son las revoluciones del agitador
N_a := root(N_p*N_a^3*D_i^5*ρ - P_L, N_a)
# Diseño mecánico
# τ es el torque, usamos el torque máximo para cuando tenemos mas de un impulsor
τ := P_L/(N_a*2*π)
τ_max := 63025*P_L/hp/(N_a/rpm)*in*lbf
# Cálculo del Momento máximo
# f.H factor hidraúlico (tabla )
# c.c factor de conversión
c_c := 0.048
f_H := □
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M_max := c_c*P_L*L_e*f_H/(N_a*D)
M_max := c_c*P_L/W*L_e/m*f_H/(N_a/(1/s)*D/m)*J
# El mínimo diámetro de barra posible es el valor mas grande de estas dos ecuaciones, para ello necesitamos los valores de tension admisible σ.s y σ.t
kpsi := 1000 psi
# Esfuerzo de corte | Esfuerzo de Tracción
σ_s := 55*kpsi  # disabled
σ_t := 12.9*kpsi  # disabled
# si tenemos mas de un impulsor debemos usar el torque maximo, en vez del torque
d_s := (16*sqrt(τ^2 + M_max^2)/(π*σ_s))^(1/3)
d_t := (16*(M_max + sqrt(τ^2 + M_max^2))/(π*σ_t))^(1/3)
# W.p es el peso de las aspas del impulsor
W_p := sqrt(0.084*(D_i/m)^3*P_L/W/(N_a/(1/s)))*kg
S_b := 10 cm  # S.b generalmente toma valores de 10 a 13 cm
E_m := □*psi
ρ_m := □*lb/in^3
w := π*d_t^2/4*ρ_m
C_Nc := 5.33
# - Em es el módulo de elasticidad (tensión), en este caso acero al carbono y ρm su densidad.
# - Cnc es un factor de conversión para el SI
# - w es el peso de la barra por cada metro
# - Sb es la distancia entre cojinetes
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N_C := C_Nc*(d_t/m)^2*sqrt(E_m/Pa/(ρ_m/(kg/m^3)))/(L_e/m*sqrt(L_e/m + S_b/m)*sqrt(W_b/kg + w/(kg/m)*L_e/m/4))*1/s
N_a =  # error: This variable is undefined.
N_C =  # error
N_C*0.8 =  # error
N_C*1.2 =  # error
# 20% más de la Nc | 20% menos de la Nc
# Los agitadores no deben operarse continuamente a una velocidad cercana a la frecuencia natural, o la frecuencia de vibración libre del eje y el impulsor. Las frecuencias naturales laterales afectan a todos los ejes de los agitadores (Tabla 6.21). La regla general es mantener los agitadores al menos un 20% alejados de la velocidad crítica y sus armónicos.
