# Diseño de Agitador
# Diseño de un sistema de agitación. Se va a diseñar un sistema de agitación para un fluido que tiene una densidad de 950 kg/m3 y una viscosidad de 0.05 poise. El volumen del recipiente es de 1.5 m3 con  0.5CV=0.986 hp
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# - Dentro del tanque va a llevarse a cabo una transferencia de calor.
# - Las proporciones estándar deben mantenerse en el diseño.
# - La agitación debe llevarse a cabo bajo régimen turbulento.
# - La altura del tanque es un 20% mayor que la altura del líquido
# Obtenga la siguiente información, necesaria para el diseño del tanque.
# a) Diámetro del tanque.
# b) Diámetro del agitador.
# c) Ancho de las paletas del agitador.
# d) Altura del líquido
# e) Distancia del impulsor al fondo del tanque
# f) Largo de la paleta del impulsor.
# g) Ancho de los bafles deflectores.
# h) Volumen ocupado por el líquido
# i) Revoluciones por minuto del agitador
# j) Potencia suminastrada al líquido
# k) Potencia necesaria del motor
# Ud. dispone de un motor de 1 1/4 hp de potencia. Servirá este motor para la agitación?
ρ := 950*kg/m^3
μ := 0.05*poise
V_t := 1.5 m^3
s_1 := 1/3
s_2 := 1
s_3 := 1/4
s_4 := 1/5
s_5 := 1/12
s_6 := 1
Given
T := m
π*T^2/4*1.2*T == V_t
# a) Diametro del tanque
T := Find(T) = 1.16754 m
D := s_1*T = 38.9181 cm
# b) Diametro del agitador
W_a := s_4*D = 7.78363 cm
# c) Ancho de las paletas del agitador
H := s_6*T = 1.16754 m
# d) Altura del líquido
# e) Distancia del impulsor al fondo del tanque
C := s_2*D = 38.9181 cm
# f) Largo de la paletas del impulsor
L := s_3*D = 9.72954 cm
# g) Ancho de los bafles deflectores
B := s_5*T = 9.72954 cm
# h) Volumen ocupado por el líquido
V_L := V_t/1.20 = 1250 L
# j) Potencia suminastrada al líquido
Pot_V := 3.5 hp/(1000 gal) = 0.689476 kW/m^3
P_L := Pot_V*V_L = 861.845 W
# i) Revolucioones por minuto del agitador
H_t := 1.2*H = 1.40105 m
N_p := 1.27  # De tabla 6.7 (p.104) para PBT 4 aspas
Given
P_L = 861.845 W
P_L == N_p*N_a^3*D^5*ρ
N_a := rpm
N_a := root(N_p*N_a^3*D^5*ρ - P_L, N_a) = (41.1483 + 1.61525e-9i) rpm
# k) Potencia necesaria del motor
P_M := 1.4*P_L = 1.61805 hp
# Calculamos el torque del fluido
τ := N_p*N_a^3*D^5*ρ/(N_a*2*π) = (31.8324 + 2.49911e-9i) J
τ_max := 63025*P_L/hp/(N_a/rpm)*in*lbf = (200.007 - 7.85115e-9i) J
τ_max := P_L/N_a = (200.009 - 7.8512e-9i) J
# Calculamos el momento máximo para calcular el diámetro del eje del agitador
# Necesitamos el largo del eje
c_c := 0.048
L_e := H_t - C = 1.01187 m
f_H := 2
M_max := c_c*P_L*L_e*f_H/(N_a*D) = (49.9221 - 1.95966e-9i) J
M_max := c_c*P_L/W*L_e/m*f_H/(N_a/(1/s)*D/m)*J = (49.9221 - 1.95966e-9i) J
# Ahora calculamos los diámetros, el mayor de estos será el diametro del eje
kpsi := 1000 psi
# Esfuerzo de corte | Esfuerzo de Tracción
σ_t := 12.9*kpsi = 88.9424 MPa
σ_s := 55*kpsi = 379.212 MPa
d_s := (16*sqrt(τ^2 + M_max^2)/(π*σ_s))^(1/3) = (9.26449 - 1.61016e-11i) mm
d_t := (16*(M_max + sqrt(τ^2 + M_max^2))/(π*σ_t))^(1/3) = (18.4191 - 1.2762e-10i) mm
# El diametro del eje es dt = 18.4mm
D = 0.389181 m
P_L = 861.845 W
W_b_15% := sqrt(0.084*(D/m)^3*P_L/W/(N_a/(1/s)))*kg = (0.995158 - 1.95321e-11i) kg
S_b := 10 cm
W_b := W_b_15% = (0.995158 - 1.95321e-11i) kg
E_m := 29.8*10^6*psi
ρ_m := 0.283*lb/in^3
w := π*d_t^2/4*ρ_m = (2.08726 - 2.89238e-11i) kg/m
C_Nc := 5.33
# - Em es el módulo de elasticidad (tensión), en este caso acero al carbono y ρm su densidad.
# - Cnc es un factor de conversión para el SI
# - w es el peso de la barra por cada metro
# - Sb es la distancia entre cojinetes
# uso este valor porque voy a calcular la velocidad crítica en rps, por lo tanto todas las variables las hago adimensional en unidades del SI. Rules of Thumbs pp 122-123 (libro)
N_C := C_Nc*(d_t/m)^2*sqrt(E_m/Pa/(ρ_m/(kg/m^3)))/(L_e/m*sqrt(L_e/m + S_b/m)*sqrt(W_b/kg + w/(kg/m)*L_e/m/4))*1/s = (67.1583 - 3.38734e-10i) rpm
N_a = (41.1483 + 1.61525e-9i) rpm
N_C = (67.1583 - 3.38734e-10i) rpm
N_C*0.8 = (53.7267 - 2.70987e-10i) rpm
N_C*1.2 = (80.59 - 4.0648e-10i) rpm
# 20% más de la Nc | 20% menos de la Nc
# Los agitadores no deben operarse continuamente a una velocidad cercana a la frecuencia natural, o la frecuencia de vibración libre del eje y el impulsor. Las frecuencias naturales laterales afectan a todos los ejes de los agitadores (Tabla 6.21). La regla general es mantener los agitadores al menos un 20% alejados de la velocidad crítica y sus armónicos.
