D_i := 60 cm
P_1 := 6.8 atm
v_1 := 12.2*m/s
T_1 := (21 + 273.15)*K
PM := 16.043*gm/mol
# [reference: Referencias.xmcd]
# Calculo la densidad
ρ_CH4 := ρ(PM, T_1, P_1) = 4.52285 kg/m^3
# Calculo la viscosidad
μ_CH4 := μ(3.8435, 0.411, -1.43*10^-4, T_1) = 112.366 μP
# Calculo la velocidad
S_T := π*D_i^2/4 = 0.282743 m^2
Q_V := S_T*v_1 = 3.44947 m^3/s
ω := Q_V*ρ_CH4 = 56165.1 kg/hr
V*dP + v*dv + E_f == -δW
v(T, P) := ω/(S_T*ρ(PM, T, P))
dvP_T(T, P) := d/dP(v(T, P))
N_Re := v_1*D_i*ρ_CH4/μ_CH4 = 2946370
# Calculo del factor de fricción
rug_relat := 0
A_suc(T, P) := (2.457*ln(1/((7/N_Re)^0.9 + 0.27*rug_relat)))^16
B_suc(T, P) := (37530/N_Re)^16
f_f(T, P) := 8*((8/N_Re)^12 + 1/(A_suc(T, P) + B_suc(T, P))^(3/2))^(1/12)
f_f(T_1, P_1) = 0.00975536
# Calculo el CP de gas
Cp_CH4 := Cp_G(34.942, -0.03996, 1.9184*10^-4, -1.53*10^-7, 3.9321*10^-11, T_1) = 35.8926 J/(mol*K)
C_P(T) := Cp_G(34.942, -0.03996, 1.9184*10^-4, -1.53*10^-7, 3.9321*10^-11, T)
# Calculo el CV de gas
Cv_G := Cp_CH4 + R_g = 44.2012 J/(mol*K)
P := 4 atm
P_2 := root(integral(1/ρ(PM, T_1, P), P = P_1 .. P) + integral(v(T_1, P)*dvP_T(T_1, P), P = P_1 .. P) + integral(f_f(T_1, P)/D_i*v(T_1, P)^2/2, L = 0 m .. 16000 m), P) = 5.65866 atm
# Calculo Entropia de gas
S_0 := 0
S_CH4(T) := S_G(154.6, 0.113, -1.91*10^-5, T)
S(T, P) := S_0 + S_CH4(T) - R_g*ln(P/bar)
T_a(P) := root(S(T_1, P_2) - S(T, P), T, 0 K, 500 K)
T_a(P_1) = 309.194 K
T_2ad := T_a(P_1) = 309.194 K
dPT(T, V) := d/dT(P_PR(T, V))  # error: This variable is undefined.
H_0 := 0
dPV(T, V) := d/dV(P_PR(T, V))  # error: This variable is undefined.
H(T) := integral(C_P(T), T = 298 K .. T)
W := H(T_1) - H(T_2ad) = -543.778 J/mol
Pot := W*ω/PM = -709.147 hp
